*MATERIAL, NAME=CONCRETE
*ELASTIC
1.000e+10, 0.300
*DENSITY
2.000e+03
**
**
*PART, NAME=PART_FRAME
**
*NODE,NSET=AB
1001,0.00000,0.00000,0.00000
1002,0.30000,0.00000,0.00000
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**
**
*ELEMENT, TYPE=B31, ELSET=AB
1001, 1001, 1002
1002, 1002, 1003
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**
**
*NODE,NSET=BC
2001,6.00000,0.00000,0.00000
2002,6.00000,0.00000,-0.30000
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**
**
*ELEMENT, TYPE=B31, ELSET=BC
2001, 2001, 2002
2002, 2002, 2003
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**
**
*BEAM SECTION, ELSET=AB, MATERIAL=CONCRETE, SECTION=RECTANGULAR
0.12000, 0.12000
0.000, 1.000, 0.000
**
*BEAM SECTION, ELSET=BC, MATERIAL=CONCRETE, SECTION=RECTANGULAR
0.12000, 0.12000
0.000, 1.000, 0.000
**
*MPC
TIE, 2001,1021
**
*NSET, NSET=SUPPORT_A
1001
**
**
*NSET, NSET=SUPPORT_B
1021
**
**
*NSET, NSET=SUPPORT_C
2021
**
**
*END PART
**
***********************************************************
** ASSEMBLY
***********************************************************
*ASSEMBLY, NAME=ASSEMBLY_FRAME
**
*INSTANCE, NAME=PART_FRAME, PART=PART_FRAME
**
*END INSTANCE
**
*END ASSEMBLY
**
**********
**
**********
*STEP , NAME=STEP_MODAL
*FREQUENCY, NORMALIZATION=DISPLACEMENT, SIM=NO
20
**
**
*BOUNDARY, OP=NEW
PART_FRAME.SUPPORT_A,1,4,0
**
**
*BOUNDARY, OP=NEW
PART_FRAME.SUPPORT_B,2,4,0
**
**
*BOUNDARY, OP=NEW
PART_FRAME.SUPPORT_C,1,2,0
**
**
*BOUNDARY, OP=NEW
PART_FRAME.SUPPORT_C,4,4,0
**
**
*BOUNDARY, OP=NEW
PART_FRAME.AB,2,2,0
**
**
*BOUNDARY, OP=NEW
PART_FRAME.BC,2,2,0
**
**
*OUTPUT, FIELD
*NODE OUTPUT
U
COORD
**
*OUTPUT, FIELD
*ELEMENT OUTPUT
SF
**
*END STEP
**
**
**********
** Dead load
**********
*STEP , NLGEO=NO, NAME=STEP_STATIC
*STATIC
1e-3, 1, 1e-6, 1
**
*BOUNDARY, OP=NEW
PART_FRAME.SUPPORT_A,1,4,0
**
**
*BOUNDARY, OP=NEW
PART_FRAME.SUPPORT_B,2,4,0
**
**
*BOUNDARY, OP=NEW
PART_FRAME.SUPPORT_C,1,2,0
**
**
*BOUNDARY, OP=NEW
PART_FRAME.SUPPORT_C,4,4,0
**
**
*BOUNDARY, OP=NEW
PART_FRAME.AB,2,2,0
**
**
*BOUNDARY, OP=NEW
PART_FRAME.BC,2,2,0
**
**
*DLOAD, OP=NEW
part_frame.BC, PX, -7.000000e-03
**
*OUTPUT, FIELD, FREQUENCY=100
*NODE OUTPUT
U
RF
COORD
**
*OUTPUT, FIELD, FREQUENCY=100
*ELEMENT OUTPUT
SF
**
*END STEP
**
**
*Step, name=BUCKLqING, perturbation
*Buckle, eigensolver=Lanczos
10
*DLOAD, OP=NEW
part_frame.BC, PX, -7.000000e+03
**
*OUTPUT, FIELD, FREQUENCY=100
*NODE OUTPUT
U
RF
COORD
**
*OUTPUT, FIELD, FREQUENCY=100
*ELEMENT OUTPUT
SF
**
*End Step
