*PART, NAME=PART_TRUSS
**
*NODE,NSET=NODES_CHORD
1,0.00000,0.00000,0.00000
2,6.00000,0.00000,0.00000
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**
**
*ELEMENT, TYPE=B31, ELSET=TRUSS_CHORD
100, 1, 2
101, 2, 3
102, 3, 4
103, 4, 5
201, 11, 12
202, 12, 13
203, 13, 14
**
**
*BEAM GENERAL SECTION, ELSET=TRUSS_CHORD, SECTION=GENERAL, DENSITY=7850.000
1.00000e-04, 1.00000e-06, 0.00000e+00, 1.00000e-06, 1.00000e-06
0.000, 1.000, 0.000
2.10000e+11, 8.10000e+10
**
**********
** Member DIA1
**********
*NODE,NSET=DIA1
1001,0.03714,0.00000,0.09285
1002,0.10846,0.00000,0.27116
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**
**
*ELEMENT, TYPE=B31, ELSET=DIA1
1001, 1001, 1002
1002, 1002, 1003
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**
**
** Extra node (b) for definition of orientation system
*NODE,NSET=DIA1_BNODE
1000,0.03714,1.00000,0.09285
**
**
*ORIENTATION, NAME=DIA1_LOCSYS, DEFINITION=NODES
11,1000,1
**
**
** Joint J1
*ELEMENT, TYPE=JOINTC, ELSET=DIA1_J1
1028, 1, 1001
*JOINT, ELSET=DIA1_J1, ORIENTATION=DIA1_LOCSYS
*SPRING
1,1
1.000e+12
*SPRING
2,2
1.000e+12
*SPRING
3,3
1.000e+12
*SPRING
4,4
1.000e+10
*SPRING
5,5
1.000e+10
*SPRING
6,6
1.000e+10
** Joint J2
*ELEMENT, TYPE=JOINTC, ELSET=DIA1_J2
1029, 1028, 11
*JOINT, ELSET=DIA1_J2, ORIENTATION=DIA1_LOCSYS
*SPRING
1,1
1.000e+10
*SPRING
2,2
1.000e+10
*SPRING
3,3
1.000e+10
** Zero joint stiffness in DOF 4
** Zero joint stiffness in DOF 5
** Zero joint stiffness in DOF 6
**
**
*BEAM GENERAL SECTION, ELSET=DIA1, SECTION=GENERAL, DENSITY=7850.000
1.00000e-05, 1.00000e-07, 0.00000e+00, 1.00000e-07, 1.00000e-07
0.000, 1.000, 0.000
2.10000e+11, 8.10000e+10
**
**********
** Member DIA2
**********
*NODE,NSET=DIA2
1101,2.06247,0.00000,4.92191
1102,2.17990,0.00000,4.77513
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**
**
*ELEMENT, TYPE=B31, ELSET=DIA2
1101, 1101, 1102
1102, 1102, 1103
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**
**
** Extra node (b) for definition of orientation system
*NODE,NSET=DIA2_BNODE
1100,2.06247,1.00000,4.92191
**
**
*ORIENTATION, NAME=DIA2_LOCSYS, DEFINITION=NODES
2,1100,11
**
**
** Joint J1
*ELEMENT, TYPE=JOINTC, ELSET=DIA2_J1
1134, 11, 1101
*JOINT, ELSET=DIA2_J1, ORIENTATION=DIA2_LOCSYS
*SPRING
1,1
1.000e+12
*SPRING
2,2
1.000e+12
*SPRING
3,3
1.000e+12
*SPRING
4,4
1.000e+10
*SPRING
5,5
1.000e+10
*SPRING
6,6
1.000e+10
** Joint J2
*ELEMENT, TYPE=JOINTC, ELSET=DIA2_J2
1135, 1134, 2
*JOINT, ELSET=DIA2_J2, ORIENTATION=DIA2_LOCSYS
*SPRING
1,1
1.000e+10
*SPRING
2,2
1.000e+10
*SPRING
3,3
1.000e+10
** Zero joint stiffness in DOF 4
** Zero joint stiffness in DOF 5
** Zero joint stiffness in DOF 6
**
**
*BEAM GENERAL SECTION, ELSET=DIA2, SECTION=GENERAL, DENSITY=7850.000
1.00000e-05, 1.00000e-07, 0.00000e+00, 1.00000e-07, 1.00000e-07
0.000, 1.000, 0.000
2.10000e+11, 8.10000e+10
**
**********
** Member DIA3
**********
*NODE,NSET=DIA3
1201,6.02873,0.00000,0.09578
1202,6.08216,0.00000,0.27387
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**
**
*ELEMENT, TYPE=B31, ELSET=DIA3
1201, 1201, 1202
1202, 1202, 1203
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**
**
** Extra node (b) for definition of orientation system
*NODE,NSET=DIA3_BNODE
1200,6.02873,1.00000,0.09578
**
**
*ORIENTATION, NAME=DIA3_LOCSYS, DEFINITION=NODES
12,1200,2
**
**
** Joint J1
*ELEMENT, TYPE=JOINTC, ELSET=DIA3_J1
1228, 2, 1201
*JOINT, ELSET=DIA3_J1, ORIENTATION=DIA3_LOCSYS
*SPRING
1,1
1.000e+12
*SPRING
2,2
1.000e+12
*SPRING
3,3
1.000e+12
*SPRING
4,4
1.000e+10
*SPRING
5,5
1.000e+10
*SPRING
6,6
1.000e+10
** Joint J2
*ELEMENT, TYPE=JOINTC, ELSET=DIA3_J2
1229, 1228, 12
*JOINT, ELSET=DIA3_J2, ORIENTATION=DIA3_LOCSYS
*SPRING
1,1
1.000e+10
*SPRING
2,2
1.000e+10
*SPRING
3,3
1.000e+10
** Zero joint stiffness in DOF 4
** Zero joint stiffness in DOF 5
** Zero joint stiffness in DOF 6
**
**
*BEAM GENERAL SECTION, ELSET=DIA3, SECTION=GENERAL, DENSITY=7850.000
1.00000e-05, 1.00000e-07, 0.00000e+00, 1.00000e-07, 1.00000e-07
0.000, 1.000, 0.000
2.10000e+11, 8.10000e+10
**
**********
** Member DIA4
**********
*NODE,NSET=DIA4
1301,7.54472,0.00000,4.91056
1302,7.63081,0.00000,4.73837
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**
**
*ELEMENT, TYPE=B31, ELSET=DIA4
1301, 1301, 1302
1302, 1302, 1303
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**
**
** Extra node (b) for definition of orientation system
*NODE,NSET=DIA4_BNODE
1300,7.54472,1.00000,4.91056
**
**
*ORIENTATION, NAME=DIA4_LOCSYS, DEFINITION=NODES
3,1300,12
**
**
** Joint J1
*ELEMENT, TYPE=JOINTC, ELSET=DIA4_J1
1329, 12, 1301
*JOINT, ELSET=DIA4_J1, ORIENTATION=DIA4_LOCSYS
*SPRING
1,1
1.000e+12
*SPRING
2,2
1.000e+12
*SPRING
3,3
1.000e+12
*SPRING
4,4
1.000e+10
*SPRING
5,5
1.000e+10
*SPRING
6,6
1.000e+10
** Joint J2
*ELEMENT, TYPE=JOINTC, ELSET=DIA4_J2
1330, 1329, 3
*JOINT, ELSET=DIA4_J2, ORIENTATION=DIA4_LOCSYS
*SPRING
1,1
1.000e+10
*SPRING
2,2
1.000e+10
*SPRING
3,3
1.000e+10
** Zero joint stiffness in DOF 4
** Zero joint stiffness in DOF 5
** Zero joint stiffness in DOF 6
**
**
*BEAM GENERAL SECTION, ELSET=DIA4, SECTION=GENERAL, DENSITY=7850.000
1.00000e-05, 1.00000e-07, 0.00000e+00, 1.00000e-07, 1.00000e-07
0.000, 1.000, 0.000
2.10000e+11, 8.10000e+10
**
**********
** Member DIA5
**********
*NODE,NSET=DIA5
1401,10.04472,0.00000,0.08944
1402,10.13081,0.00000,0.26163
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**
**
*ELEMENT, TYPE=B31, ELSET=DIA5
1401, 1401, 1402
1402, 1402, 1403
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**
**
** Extra node (b) for definition of orientation system
*NODE,NSET=DIA5_BNODE
1400,10.04472,1.00000,0.08944
**
**
*ORIENTATION, NAME=DIA5_LOCSYS, DEFINITION=NODES
13,1400,3
**
**
** Joint J1
*ELEMENT, TYPE=JOINTC, ELSET=DIA5_J1
1429, 3, 1401
*JOINT, ELSET=DIA5_J1, ORIENTATION=DIA5_LOCSYS
*SPRING
1,1
1.000e+12
*SPRING
2,2
1.000e+12
*SPRING
3,3
1.000e+12
*SPRING
4,4
1.000e+10
*SPRING
5,5
1.000e+10
*SPRING
6,6
1.000e+10
** Joint J2
*ELEMENT, TYPE=JOINTC, ELSET=DIA5_J2
1430, 1429, 13
*JOINT, ELSET=DIA5_J2, ORIENTATION=DIA5_LOCSYS
*SPRING
1,1
1.000e+10
*SPRING
2,2
1.000e+10
*SPRING
3,3
1.000e+10
** Zero joint stiffness in DOF 4
** Zero joint stiffness in DOF 5
** Zero joint stiffness in DOF 6
**
**
*BEAM GENERAL SECTION, ELSET=DIA5, SECTION=GENERAL, DENSITY=7850.000
1.00000e-05, 1.00000e-07, 0.00000e+00, 1.00000e-07, 1.00000e-07
0.000, 1.000, 0.000
2.10000e+11, 8.10000e+10
**
**********
** Member DIA6
**********
*NODE,NSET=DIA6
1501,12.52873,0.00000,4.90422
1502,12.58216,0.00000,4.72613
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**
**
*ELEMENT, TYPE=B31, ELSET=DIA6
1501, 1501, 1502
1502, 1502, 1503
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**
**
** Extra node (b) for definition of orientation system
*NODE,NSET=DIA6_BNODE
1500,12.52873,1.00000,4.90422
**
**
*ORIENTATION, NAME=DIA6_LOCSYS, DEFINITION=NODES
4,1500,13
**
**
** Joint J1
*ELEMENT, TYPE=JOINTC, ELSET=DIA6_J1
1528, 13, 1501
*JOINT, ELSET=DIA6_J1, ORIENTATION=DIA6_LOCSYS
*SPRING
1,1
1.000e+12
*SPRING
2,2
1.000e+12
*SPRING
3,3
1.000e+12
*SPRING
4,4
1.000e+10
*SPRING
5,5
1.000e+10
*SPRING
6,6
1.000e+10
** Joint J2
*ELEMENT, TYPE=JOINTC, ELSET=DIA6_J2
1529, 1528, 4
*JOINT, ELSET=DIA6_J2, ORIENTATION=DIA6_LOCSYS
*SPRING
1,1
1.000e+10
*SPRING
2,2
1.000e+10
*SPRING
3,3
1.000e+10
** Zero joint stiffness in DOF 4
** Zero joint stiffness in DOF 5
** Zero joint stiffness in DOF 6
**
**
*BEAM GENERAL SECTION, ELSET=DIA6, SECTION=GENERAL, DENSITY=7850.000
1.00000e-05, 1.00000e-07, 0.00000e+00, 1.00000e-07, 1.00000e-07
0.000, 1.000, 0.000
2.10000e+11, 8.10000e+10
**
**********
** Member DIA7
**********
*NODE,NSET=DIA7
1601,14.06247,0.00000,0.07809
1602,14.17990,0.00000,0.22487
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**
**
*ELEMENT, TYPE=B31, ELSET=DIA7
1601, 1601, 1602
1602, 1602, 1603
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**
**
** Extra node (b) for definition of orientation system
*NODE,NSET=DIA7_BNODE
1600,14.06247,1.00000,0.07809
**
**
*ORIENTATION, NAME=DIA7_LOCSYS, DEFINITION=NODES
14,1600,4
**
**
** Joint J1
*ELEMENT, TYPE=JOINTC, ELSET=DIA7_J1
1634, 4, 1601
*JOINT, ELSET=DIA7_J1, ORIENTATION=DIA7_LOCSYS
*SPRING
1,1
1.000e+12
*SPRING
2,2
1.000e+12
*SPRING
3,3
1.000e+12
*SPRING
4,4
1.000e+10
*SPRING
5,5
1.000e+10
*SPRING
6,6
1.000e+10
** Joint J2
*ELEMENT, TYPE=JOINTC, ELSET=DIA7_J2
1635, 1634, 14
*JOINT, ELSET=DIA7_J2, ORIENTATION=DIA7_LOCSYS
*SPRING
1,1
1.000e+10
*SPRING
2,2
1.000e+10
*SPRING
3,3
1.000e+10
** Zero joint stiffness in DOF 4
** Zero joint stiffness in DOF 5
** Zero joint stiffness in DOF 6
**
**
*BEAM GENERAL SECTION, ELSET=DIA7, SECTION=GENERAL, DENSITY=7850.000
1.00000e-05, 1.00000e-07, 0.00000e+00, 1.00000e-07, 1.00000e-07
0.000, 1.000, 0.000
2.10000e+11, 8.10000e+10
**
**********
** Member DIA8
**********
*NODE,NSET=DIA8
1701,18.03714,0.00000,4.90715
1702,18.10846,0.00000,4.72884
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**
**
*ELEMENT, TYPE=B31, ELSET=DIA8
1701, 1701, 1702
1702, 1702, 1703
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**
**
** Extra node (b) for definition of orientation system
*NODE,NSET=DIA8_BNODE
1700,18.03714,1.00000,4.90715
**
**
*ORIENTATION, NAME=DIA8_LOCSYS, DEFINITION=NODES
5,1700,14
**
**
** Joint J1
*ELEMENT, TYPE=JOINTC, ELSET=DIA8_J1
1728, 14, 1701
*JOINT, ELSET=DIA8_J1, ORIENTATION=DIA8_LOCSYS
*SPRING
1,1
1.000e+12
*SPRING
2,2
1.000e+12
*SPRING
3,3
1.000e+12
*SPRING
4,4
1.000e+10
*SPRING
5,5
1.000e+10
*SPRING
6,6
1.000e+10
** Joint J2
*ELEMENT, TYPE=JOINTC, ELSET=DIA8_J2
1729, 1728, 5
*JOINT, ELSET=DIA8_J2, ORIENTATION=DIA8_LOCSYS
*SPRING
1,1
1.000e+10
*SPRING
2,2
1.000e+10
*SPRING
3,3
1.000e+10
** Zero joint stiffness in DOF 4
** Zero joint stiffness in DOF 5
** Zero joint stiffness in DOF 6
**
**
*BEAM GENERAL SECTION, ELSET=DIA8, SECTION=GENERAL, DENSITY=7850.000
1.00000e-05, 1.00000e-07, 0.00000e+00, 1.00000e-07, 1.00000e-07
0.000, 1.000, 0.000
2.10000e+11, 8.10000e+10
**
*NSET, NSET=SUPPORT
1,5
**
**
*END PART
**
***********************************************************
** ASSEMBLY
***********************************************************
*ASSEMBLY, NAME=AS_TRUSS
**
*INSTANCE, NAME=PART_TRUSS, PART=PART_TRUSS
**
*END INSTANCE
**
*END ASSEMBLY
**
**********
**
**********
*STEP , NAME=STEP_MODAL
*FREQUENCY, NORMALIZATION=DISPLACEMENT, SIM=NO
50
**
**
*BOUNDARY, OP=NEW
PART_TRUSS.support,1,6,0
**
**
*BOUNDARY, OP=NEW
PART_TRUSS.NODES_CHORD,2,2,0
**
**
*OUTPUT, FIELD
*NODE OUTPUT
U
COORD
**
*OUTPUT, FIELD
*ELEMENT OUTPUT
SF
S
**
*END STEP
**
**
