**********
** Parametrized suspension bridge model
** Model input generated 2023-04-10T10:31:30
**********
**********
** Part of abaqustools package
** Oyvind Wiig Petersen, NTNU
**********
**
**********
**
** User parameter values:
**
** abaqus.foldername=C:\Cloud\OD_OWP\Work\Python\Github\abaqustools\suspensionbridge_example\sulafjorden
** abaqus.inputname=Sulafjorden_test
** abaqus.jobname=Sulafjorden_test
** abaqus.partname=SuspensionBridge
** abaqus.assemblyname=AssemblySuspensionBridge
** abaqus.runjob=True
** abaqus.cmd=abaqus
** abaqus.cpus=4.00000e+00
** abaqus.restart=False
** abaqus.halt_error=True
** abaqus.foldername_export=C:/Cloud/OD_OWP/Work/Python/Github/abaqustools/odbexport
**
** step.time=list
**
** cable.cs.A=6.00000e-01
** cable.cs.I11=2.86479e-04
** cable.cs.I22=2.86479e-04
** cable.cs.I12=0.00000e+00
** cable.cs.It=5.72958e-04
** cable.cs.rho=7.85000e+03
** cable.cs.E=2.00000e+11
** cable.cs.G=8.00000e+10
** cable.cs.sigma_target=nan
** cable.cs=unknown
** cable.normaldir=0.00000e+00, 1.00000e+00, 0.00000e+00
** cable.eltype=B31
** cable.meshsize_approx=nan
** cable.N_element=5.00000e+01
** cable.tempsupport=True
** cable.N_tempsupport=1.10000e+01
** cable.clamp=True
** cable.N_clamp=3.00000e+00
** cable.F_clamp=3.00000e+05
** cable.polycoeff_hanger_adjust=nan
** cable.nsmass=5.00000e+01
** cable.nodenum_base=1.00000e+04, 2.00000e+04
** cable.elnum_base=1.00000e+04, 2.00000e+04
**
** bridgedeck.cs.A=7.30000e-01, 7.30000e-01
** bridgedeck.cs.I11=6.40000e-01, 6.40000e-01
** bridgedeck.cs.I22=1.71400e+01, 1.71400e+01
** bridgedeck.cs.I12=0.00000e+00, 0.00000e+00
** bridgedeck.cs.It=1.85000e+00, 1.85000e+00
** bridgedeck.cs.rho=0.00000e+00, 0.00000e+00
** bridgedeck.cs.E=2.10000e+11, 2.10000e+11
** bridgedeck.cs.G=8.10000e+10, 8.10000e+10
** bridgedeck.cs.sc1=2.13000e+00, -2.13000e+00
** bridgedeck.cs.sc2=-2.00000e-01, -2.00000e-01
** bridgedeck.cs=unknown
** bridgedeck.inertia.m=9.30000e+03, 9.30000e+03
** bridgedeck.inertia.x1=0.00000e+00, 0.00000e+00
** bridgedeck.inertia.x2=0.00000e+00, 0.00000e+00
** bridgedeck.inertia.alpha=0.00000e+00, 0.00000e+00
** bridgedeck.inertia.I11=6.40000e+04, 6.40000e+04
** bridgedeck.inertia.I22=1.20000e+06, 1.20000e+06
** bridgedeck.inertia.I12=0.00000e+00, 0.00000e+00
** bridgedeck.inertia=unknown
** bridgedeck.gapbeam.type=box
** bridgedeck.gapbeam.h=2.00000e+00
** bridgedeck.gapbeam.b=2.00000e+00
** bridgedeck.gapbeam.t=2.00000e-02
** bridgedeck.gapbeam=unknown
** bridgedeck.N_box=2.00000e+00
** bridgedeck.normaldir=0.00000e+00, 1.00000e+00, 0.00000e+00
** bridgedeck.eltype=B31
** bridgedeck.meshsize=4.00000e+00
** bridgedeck.shell=True
** bridgedeck.nodenum_base=1.00000e+03, 2.00000e+03, 3.00000e+03, 4.00000e+03, 5.00000e+03
** bridgedeck.elnum_base=1.00000e+03, 2.00000e+03
** bridgedeck.nodenum_base_outer=1.10000e+04, 1.20000e+04
** bridgedeck.elnum_base_connlat=3.00000e+03, 4.00000e+03, 5.00000e+03, 6.00000e+03, 7.00000e+03, 8.00000e+03
**
** hanger.cs.A=4.00000e-03
** hanger.cs.I11=1.00000e-07
** hanger.cs.I22=1.00000e-07
** hanger.cs.I12=0.00000e+00
** hanger.cs.It=1.00000e-07
** hanger.cs.rho=7.85000e+03
** hanger.cs.E=1.60000e+11
** hanger.cs.G=6.00000e+10
** hanger.cs=unknown
** hanger.normaldir=0.00000e+00, 1.00000e+00, 0.00000e+00
** hanger.eltype=B31
** hanger.elnum_base=8.00000e+04, 9.00000e+04
**
** tower.cs.type=box
** tower.cs.h_vec=1.45000e+01, 1.05000e+01, 8.50000e+00, 8.50000e+00
** tower.cs.b_vec=1.25000e+01, 9.50000e+00, 8.00000e+00, 8.00000e+00
** tower.cs.t_vec=1.50000e+00, 1.50000e+00, 1.50000e+00, 1.50000e+00
** tower.cs.z_vec=3.00000e+01, 7.50000e+01, 3.91000e+02, 4.00000e+02
** tower.cs.rho=2.50000e+03
** tower.cs.E=3.50000e+10
** tower.cs.v=2.00000e-01
** tower.cs=unknown
** tower.normaldir=0.00000e+00, 1.00000e+00, 0.00000e+00
** tower.eltype=B31
** tower.F_pullback_south=-9.56343e+05
** tower.F_pullback_north=9.56343e+05
** tower.z_crossbeam_south=5.15000e+01, 1.75500e+02, 2.45500e+02, 3.15500e+02, 3.85500e+02
** tower.z_crossbeam_north=5.15000e+01, 1.75500e+02, 2.45500e+02, 3.15500e+02, 3.85500e+02
** tower.h_crossbeam=8.00000e+00, 8.00000e+00, 8.00000e+00, 8.00000e+00, 8.00000e+00
** tower.b_crossbeam=5.00000e+00, 5.00000e+00, 5.00000e+00, 5.00000e+00, 5.00000e+00
** tower.t_crossbeam=1.00000e+00, 1.00000e+00, 1.00000e+00, 1.00000e+00, 1.00000e+00
** tower.N_element=nan
** tower.meshsize=5.00000e+00
** tower.nodenum_base=1.00000e+05, 1.10000e+05, 2.00000e+05, 2.10000e+05
** tower.elnum_base=1.00000e+05, 1.10000e+05, 2.00000e+05, 2.10000e+05
** tower.K_south=9.56343e+05
** tower.K_north=9.56343e+05
** tower.K_est=3.06419e+06
**
** bearing.type=tri
** bearing.stiffness_south=3.00000e+07, 1.00000e+12, 1.00000e+06, 1.00000e+00, 1.00000e+00, 1.00000e+00
** bearing.stiffness_north=3.00000e+07, 1.00000e+12, 1.00000e+06, 1.00000e+00, 1.00000e+00, 1.00000e+00
** bearing.nodenum_base=4.00000e+05
** bearing.elnum_base=4.00000e+05
**
** sadle.stiffness=1.00000e+12
** sadle.elnum_base=3.00000e+05
**
** geo.L_bridgedeck=2.80000e+03
** geo.gap=2.99740e+01
** geo.dx_hanger=2.40000e+01
** geo.dx_endpiece_max=2.40000e+01
** geo.dx_pullback_south=-1.00000e+00
** geo.dx_pullback_north=1.00000e+00
** geo.z_cog_south=5.75000e+01
** geo.z_cog_north=5.75000e+01
** geo.z_cog_midspan=7.85000e+01
** geo.dz_cog_midspan_deflection=2.50000e+01
** geo.dz_cog_south_deflection=2.00000e+00
** geo.dz_cog_north_deflection=2.00000e+00
** geo.z_cable_top_south=4.00100e+02
** geo.z_cable_top_north=4.00100e+02
** geo.z_cable_midspan=8.10000e+01
** geo.dz_cable_deflection=3.00000e+01
** geo.dy_cable_anch_south=5.20000e+01
** geo.dy_cable_top_south=4.70000e+01
** geo.dy_cable_midspan=4.70000e+01
** geo.dy_cable_top_north=4.70000e+01
** geo.dy_cable_anch_north=5.20000e+01
** geo.dy_cog_hanger=8.01300e+00
** geo.dz_cog_hanger=3.32400e-01
** geo.dy_cog_inner=7.98700e+00
** geo.dz_cog_inner=-5.32600e-01
** geo.dy_pendulum=2.50000e+00
** geo.dz_slider=-1.50000e+00
** geo.dx_bearing_base=1.00000e+00
** geo.z_tower_base_south=3.00000e+01
** geo.z_tower_base_north=3.00000e+01
** geo.z_tower_top_south=4.00000e+02
** geo.z_tower_top_north=4.00000e+02
** geo.dy_tower_base_south=5.20000e+01
** geo.dy_tower_base_north=5.20000e+01
** geo.dy_tower_top_south=4.70000e+01
** geo.dy_tower_top_north=4.70000e+01
** geo.dx_tower_anch_south=7.18500e+02
** geo.dx_tower_anch_north=5.58150e+02
** geo.z_anch_south=0.00000e+00
** geo.z_anch_north=2.00600e+02
** geo.x_tower_south=-1.40000e+03
** geo.x_tower_north=1.40000e+03
** geo.y_bearing_box1=list
** geo.y_bearing_box2=list
**
** step.time=list
**
** modal.N_modes=1.00000e+02
** modal.normalization=displacement
**********
***********************************************************
** MATERIALS
***********************************************************
*MATERIAL, NAME=CONCRETE
*ELASTIC
3.500e+10, 0.200
*DENSITY
2.500e+03
**
**
*MATERIAL, NAME=SOFT
*ELASTIC
1.000e-06, 0.300
*DENSITY
1.000e-12
**
**
*MATERIAL, NAME=STEEL
*ELASTIC
2.100e+11, 0.300
*DENSITY
7.850e+03
**
**
*PART, NAME=SUSPENSIONBRIDGE
**
***********************************************************
** CABLE
***********************************************************
*NODE,NSET=CABLE_MAIN_EAST
10001,-2118.50000,-26.00000,0.00000
10002,-2104.15000,-25.95000,8.00200
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**
**
*NODE,NSET=CABLE_MAIN_WEST
20001,-2118.50000,26.00000,0.00000
20002,-2104.15000,25.95000,8.00200
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**
**
*ELEMENT, TYPE=B31, ELSET=CABLE_MAIN_EAST
10001, 10001, 10002
10002, 10002, 10003
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**
**
*ELEMENT, TYPE=B31, ELSET=CABLE_MAIN_WEST
20001, 20001, 20002
20002, 20002, 20003
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**
**
*ELEMENT, TYPE=B31, ELSET=CABLE_TEMPSUPPORT
510001, 10066, 20066
510002, 10075, 20075
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**
**
*NSET, NSET=CABLE_MAIN_ANCHORAGE
10001,10219,20001,20219
**
**
*NSET, NSET=CABLE_MAIN_SPAN
10051,10052,10053,10054,10055,10056
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**
**
*NSET, NSET=CABLE_MAIN_TOP_SOUTH_EAST
10051
**
**
*NSET, NSET=CABLE_MAIN_TOP_SOUTH_WEST
20051
**
**
*NSET, NSET=CABLE_MAIN_TOP_NORTH_EAST
10169
**
**
*NSET, NSET=CABLE_MAIN_TOP_NORTH_WEST
20169
**
**
*NSET, NSET=CABLE_MAIN_TOP
CABLE_MAIN_TOP_SOUTH_EAST
CABLE_MAIN_TOP_SOUTH_WEST
CABLE_MAIN_TOP_NORTH_EAST
CABLE_MAIN_TOP_NORTH_WEST
**
**
*ELSET, ELSET=CABLE_MAIN
CABLE_MAIN_EAST
CABLE_MAIN_WEST
**
**
*ELSET, ELSET=CABLE_MAIN_SPAN
10051,10052,10053,10054,10055,10056
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**
**
*BEAM GENERAL SECTION, ELSET=CABLE_MAIN, SECTION=GENERAL, DENSITY=7850.000
6.00000e-01, 2.86479e-04, 0.00000e+00, 2.86479e-04, 5.72958e-04
0.000, 1.000, 0.000
2.00000e+11, 8.00000e+10
**
*NONSTRUCTURAL MASS, ELSET=CABLE_MAIN, UNITS=MASS PER LENGTH
5.00000e+01
**
*BEAM GENERAL SECTION, ELSET=CABLE_TEMPSUPPORT, SECTION=GENERAL, DENSITY=0.000
1.00000e-02, 1.00000e-02, 0.00000e+00, 1.00000e-02, 1.00000e-02
1.000, 0.000, 0.000
2.10000e+11, 8.10000e+10
**
***********************************************************
** TOWER
***********************************************************
*ELSET, ELSET=TOWER_SOUTH_CS_001
100001,110001
**
**
*ELSET, ELSET=TOWER_SOUTH_CS_002
100002,110002
**
**
*ELSET, ELSET=TOWER_SOUTH_CS_003
100003,110003
**
**
*ELSET, ELSET=TOWER_SOUTH_CS_004
100004,110004
**
**
*ELSET, ELSET=TOWER_SOUTH_CS_005
100005,110005
**
**
*ELSET, ELSET=TOWER_SOUTH_CS_006
100006,110006
**
**
*ELSET, ELSET=TOWER_SOUTH_CS_007
100007,110007
**
**
*ELSET, ELSET=TOWER_SOUTH_CS_008
100008,110008
**
**
*ELSET, ELSET=TOWER_SOUTH_CS_009
100009,110009
**
**
*ELSET, ELSET=TOWER_SOUTH_CS_010
100010,110010
**
**
*ELSET, ELSET=TOWER_SOUTH_CS_011
100011,110011
**
**
*ELSET, ELSET=TOWER_SOUTH_CS_012
100012,110012
**
**
*ELSET, ELSET=TOWER_SOUTH_CS_013
100013,110013
**
**
*ELSET, ELSET=TOWER_SOUTH_CS_014
100014,110014
**
**
*ELSET, ELSET=TOWER_SOUTH_CS_015
100015,110015
**
**
*ELSET, ELSET=TOWER_SOUTH_CS_016
100016,110016
**
**
*ELSET, ELSET=TOWER_SOUTH_CS_017
100017,110017
**
**
*ELSET, ELSET=TOWER_SOUTH_CS_018
100018,110018
**
**
*ELSET, ELSET=TOWER_SOUTH_CS_019
100019,110019
**
**
*ELSET, ELSET=TOWER_SOUTH_CS_020
100020,110020
**
**
*ELSET, ELSET=TOWER_SOUTH_CS_021
100021,110021
**
**
*ELSET, ELSET=TOWER_SOUTH_CS_022
100022,110022
**
**
*ELSET, ELSET=TOWER_SOUTH_CS_023
100023,110023
**
**
*ELSET, ELSET=TOWER_SOUTH_CS_024
100024,110024
**
**
*ELSET, ELSET=TOWER_SOUTH_CS_025
100025,110025
**
**
*ELSET, ELSET=TOWER_SOUTH_CS_026
100026,110026
**
**
*ELSET, ELSET=TOWER_SOUTH_CS_027
100027,110027
**
**
*ELSET, ELSET=TOWER_SOUTH_CS_028
100028,110028
**
**
*ELSET, ELSET=TOWER_SOUTH_CS_029
100029,110029
**
**
*ELSET, ELSET=TOWER_SOUTH_CS_030
100030,110030
**
**
*ELSET, ELSET=TOWER_SOUTH_CS_031
100031,110031
**
**
*ELSET, ELSET=TOWER_SOUTH_CS_032
100032,110032
**
**
*ELSET, ELSET=TOWER_SOUTH_CS_033
100033,110033
**
**
*ELSET, ELSET=TOWER_SOUTH_CS_034
100034,110034
**
**
*ELSET, ELSET=TOWER_SOUTH_CS_035
100035,110035
**
**
*ELSET, ELSET=TOWER_SOUTH_CS_036
100036,110036
**
**
*ELSET, ELSET=TOWER_SOUTH_CS_037
100037,110037
**
**
*ELSET, ELSET=TOWER_SOUTH_CS_038
100038,110038
**
**
*ELSET, ELSET=TOWER_SOUTH_CS_039
100039,110039
**
**
*ELSET, ELSET=TOWER_SOUTH_CS_040
100040,110040
**
**
*ELSET, ELSET=TOWER_SOUTH_CS_041
100041,110041
**
**
*ELSET, ELSET=TOWER_SOUTH_CS_042
100042,110042
**
**
*ELSET, ELSET=TOWER_SOUTH_CS_043
100043,110043
**
**
*ELSET, ELSET=TOWER_SOUTH_CS_044
100044,110044
**
**
*ELSET, ELSET=TOWER_SOUTH_CS_045
100045,110045
**
**
*ELSET, ELSET=TOWER_SOUTH_CS_046
100046,110046
**
**
*ELSET, ELSET=TOWER_SOUTH_CS_047
100047,110047
**
**
*ELSET, ELSET=TOWER_SOUTH_CS_048
100048,110048
**
**
*ELSET, ELSET=TOWER_SOUTH_CS_049
100049,110049
**
**
*ELSET, ELSET=TOWER_SOUTH_CS_050
100050,110050
**
**
*ELSET, ELSET=TOWER_SOUTH_CS_051
100051,110051
**
**
*ELSET, ELSET=TOWER_SOUTH_CS_052
100052,110052
**
**
*ELSET, ELSET=TOWER_SOUTH_CS_053
100053,110053
**
**
*ELSET, ELSET=TOWER_SOUTH_CS_054
100054,110054
**
**
*ELSET, ELSET=TOWER_SOUTH_CS_055
100055,110055
**
**
*ELSET, ELSET=TOWER_SOUTH_CS_056
100056,110056
**
**
*ELSET, ELSET=TOWER_SOUTH_CS_057
100057,110057
**
**
*ELSET, ELSET=TOWER_SOUTH_CS_058
100058,110058
**
**
*ELSET, ELSET=TOWER_SOUTH_CS_059
100059,110059
**
**
*ELSET, ELSET=TOWER_SOUTH_CS_060
100060,110060
**
**
*ELSET, ELSET=TOWER_SOUTH_CS_061
100061,110061
**
**
*ELSET, ELSET=TOWER_SOUTH_CS_062
100062,110062
**
**
*ELSET, ELSET=TOWER_SOUTH_CS_063
100063,110063
**
**
*ELSET, ELSET=TOWER_SOUTH_CS_064
100064,110064
**
**
*ELSET, ELSET=TOWER_SOUTH_CS_065
100065,110065
**
**
*ELSET, ELSET=TOWER_SOUTH_CS_066
100066,110066
**
**
*ELSET, ELSET=TOWER_SOUTH_CS_067
100067,110067
**
**
*ELSET, ELSET=TOWER_SOUTH_CS_068
100068,110068
**
**
*ELSET, ELSET=TOWER_SOUTH_CS_069
100069,110069
**
**
*ELSET, ELSET=TOWER_SOUTH_CS_070
100070,110070
**
**
*ELSET, ELSET=TOWER_SOUTH_CS_071
100071,110071
**
**
*ELSET, ELSET=TOWER_SOUTH_CS_072
100072,110072
**
**
*ELSET, ELSET=TOWER_SOUTH_CS_073
100073,110073
**
**
*ELSET, ELSET=TOWER_SOUTH_CS_074
100074,110074
**
**
*ELSET, ELSET=TOWER_NORTH_CS_001
200001,210001
**
**
*ELSET, ELSET=TOWER_NORTH_CS_002
200002,210002
**
**
*ELSET, ELSET=TOWER_NORTH_CS_003
200003,210003
**
**
*ELSET, ELSET=TOWER_NORTH_CS_004
200004,210004
**
**
*ELSET, ELSET=TOWER_NORTH_CS_005
200005,210005
**
**
*ELSET, ELSET=TOWER_NORTH_CS_006
200006,210006
**
**
*ELSET, ELSET=TOWER_NORTH_CS_007
200007,210007
**
**
*ELSET, ELSET=TOWER_NORTH_CS_008
200008,210008
**
**
*ELSET, ELSET=TOWER_NORTH_CS_009
200009,210009
**
**
*ELSET, ELSET=TOWER_NORTH_CS_010
200010,210010
**
**
*ELSET, ELSET=TOWER_NORTH_CS_011
200011,210011
**
**
*ELSET, ELSET=TOWER_NORTH_CS_012
200012,210012
**
**
*ELSET, ELSET=TOWER_NORTH_CS_013
200013,210013
**
**
*ELSET, ELSET=TOWER_NORTH_CS_014
200014,210014
**
**
*ELSET, ELSET=TOWER_NORTH_CS_015
200015,210015
**
**
*ELSET, ELSET=TOWER_NORTH_CS_016
200016,210016
**
**
*ELSET, ELSET=TOWER_NORTH_CS_017
200017,210017
**
**
*ELSET, ELSET=TOWER_NORTH_CS_018
200018,210018
**
**
*ELSET, ELSET=TOWER_NORTH_CS_019
200019,210019
**
**
*ELSET, ELSET=TOWER_NORTH_CS_020
200020,210020
**
**
*ELSET, ELSET=TOWER_NORTH_CS_021
200021,210021
**
**
*ELSET, ELSET=TOWER_NORTH_CS_022
200022,210022
**
**
*ELSET, ELSET=TOWER_NORTH_CS_023
200023,210023
**
**
*ELSET, ELSET=TOWER_NORTH_CS_024
200024,210024
**
**
*ELSET, ELSET=TOWER_NORTH_CS_025
200025,210025
**
**
*ELSET, ELSET=TOWER_NORTH_CS_026
200026,210026
**
**
*ELSET, ELSET=TOWER_NORTH_CS_027
200027,210027
**
**
*ELSET, ELSET=TOWER_NORTH_CS_028
200028,210028
**
**
*ELSET, ELSET=TOWER_NORTH_CS_029
200029,210029
**
**
*ELSET, ELSET=TOWER_NORTH_CS_030
200030,210030
**
**
*ELSET, ELSET=TOWER_NORTH_CS_031
200031,210031
**
**
*ELSET, ELSET=TOWER_NORTH_CS_032
200032,210032
**
**
*ELSET, ELSET=TOWER_NORTH_CS_033
200033,210033
**
**
*ELSET, ELSET=TOWER_NORTH_CS_034
200034,210034
**
**
*ELSET, ELSET=TOWER_NORTH_CS_035
200035,210035
**
**
*ELSET, ELSET=TOWER_NORTH_CS_036
200036,210036
**
**
*ELSET, ELSET=TOWER_NORTH_CS_037
200037,210037
**
**
*ELSET, ELSET=TOWER_NORTH_CS_038
200038,210038
**
**
*ELSET, ELSET=TOWER_NORTH_CS_039
200039,210039
**
**
*ELSET, ELSET=TOWER_NORTH_CS_040
200040,210040
**
**
*ELSET, ELSET=TOWER_NORTH_CS_041
200041,210041
**
**
*ELSET, ELSET=TOWER_NORTH_CS_042
200042,210042
**
**
*ELSET, ELSET=TOWER_NORTH_CS_043
200043,210043
**
**
*ELSET, ELSET=TOWER_NORTH_CS_044
200044,210044
**
**
*ELSET, ELSET=TOWER_NORTH_CS_045
200045,210045
**
**
*ELSET, ELSET=TOWER_NORTH_CS_046
200046,210046
**
**
*ELSET, ELSET=TOWER_NORTH_CS_047
200047,210047
**
**
*ELSET, ELSET=TOWER_NORTH_CS_048
200048,210048
**
**
*ELSET, ELSET=TOWER_NORTH_CS_049
200049,210049
**
**
*ELSET, ELSET=TOWER_NORTH_CS_050
200050,210050
**
**
*ELSET, ELSET=TOWER_NORTH_CS_051
200051,210051
**
**
*ELSET, ELSET=TOWER_NORTH_CS_052
200052,210052
**
**
*ELSET, ELSET=TOWER_NORTH_CS_053
200053,210053
**
**
*ELSET, ELSET=TOWER_NORTH_CS_054
200054,210054
**
**
*ELSET, ELSET=TOWER_NORTH_CS_055
200055,210055
**
**
*ELSET, ELSET=TOWER_NORTH_CS_056
200056,210056
**
**
*ELSET, ELSET=TOWER_NORTH_CS_057
200057,210057
**
**
*ELSET, ELSET=TOWER_NORTH_CS_058
200058,210058
**
**
*ELSET, ELSET=TOWER_NORTH_CS_059
200059,210059
**
**
*ELSET, ELSET=TOWER_NORTH_CS_060
200060,210060
**
**
*ELSET, ELSET=TOWER_NORTH_CS_061
200061,210061
**
**
*ELSET, ELSET=TOWER_NORTH_CS_062
200062,210062
**
**
*ELSET, ELSET=TOWER_NORTH_CS_063
200063,210063
**
**
*ELSET, ELSET=TOWER_NORTH_CS_064
200064,210064
**
**
*ELSET, ELSET=TOWER_NORTH_CS_065
200065,210065
**
**
*ELSET, ELSET=TOWER_NORTH_CS_066
200066,210066
**
**
*ELSET, ELSET=TOWER_NORTH_CS_067
200067,210067
**
**
*ELSET, ELSET=TOWER_NORTH_CS_068
200068,210068
**
**
*ELSET, ELSET=TOWER_NORTH_CS_069
200069,210069
**
**
*ELSET, ELSET=TOWER_NORTH_CS_070
200070,210070
**
**
*ELSET, ELSET=TOWER_NORTH_CS_071
200071,210071
**
**
*ELSET, ELSET=TOWER_NORTH_CS_072
200072,210072
**
**
*ELSET, ELSET=TOWER_NORTH_CS_073
200073,210073
**
**
*ELSET, ELSET=TOWER_NORTH_CS_074
200074,210074
**
**
*NODE,NSET=TOWER_LEG_SOUTH_EAST
100001,-1400.00000,-26.00000,30.00000
100002,-1400.00000,-25.96622,35.00000
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**
**
*NODE,NSET=TOWER_LEG_SOUTH_WEST
110001,-1400.00000,26.00000,30.00000
110002,-1400.00000,25.96622,35.00000
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**
**
*NODE,NSET=TOWER_LEG_NORTH_EAST
200001,1400.00000,-26.00000,30.00000
200002,1400.00000,-25.96622,35.00000
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**
**
*NODE,NSET=TOWER_LEG_NORTH_WEST
210001,1400.00000,26.00000,30.00000
210002,1400.00000,25.96622,35.00000
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**
**
*ELEMENT, TYPE=B31, ELSET=TOWER_LEG_SOUTH_EAST
100001, 100001, 100002
100002, 100002, 100003
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**
**
*ELEMENT, TYPE=B31, ELSET=TOWER_LEG_SOUTH_WEST
110001, 110001, 110002
110002, 110002, 110003
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**
**
*ELEMENT, TYPE=B31, ELSET=TOWER_LEG_NORTH_EAST
200001, 200001, 200002
200002, 200002, 200003
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**
**
*ELEMENT, TYPE=B31, ELSET=TOWER_LEG_NORTH_WEST
210001, 210001, 210002
210002, 210002, 210003
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**
**
*ELEMENT, TYPE=B31, ELSET=TOWER_CROSSBEAM_SOUTH_1
101001, 101001, 101002
101002, 101002, 101003
101003, 101003, 101004
101004, 101004, 101005
101005, 101005, 101006
101006, 101006, 101007
101007, 101007, 101008
**
**
*ELEMENT, TYPE=B31, ELSET=TOWER_CROSSBEAM_SOUTH_2
101101, 101101, 101102
101102, 101102, 101103
101103, 101103, 101104
101104, 101104, 101105
**
**
*ELEMENT, TYPE=B31, ELSET=TOWER_CROSSBEAM_SOUTH_3
101201, 101201, 101202
101202, 101202, 101203
101203, 101203, 101204
101204, 101204, 101205
**
**
*ELEMENT, TYPE=B31, ELSET=TOWER_CROSSBEAM_SOUTH_4
101301, 101301, 101302
101302, 101302, 101303
101303, 101303, 101304
101304, 101304, 101305
**
**
*ELEMENT, TYPE=B31, ELSET=TOWER_CROSSBEAM_SOUTH_5
101401, 101401, 101402
101402, 101402, 101403
101403, 101403, 101404
101404, 101404, 101405
**
**
*ELEMENT, TYPE=B31, ELSET=TOWER_CROSSBEAM_NORTH_1
201001, 201001, 201002
201002, 201002, 201003
201003, 201003, 201004
201004, 201004, 201005
201005, 201005, 201006
201006, 201006, 201007
201007, 201007, 201008
**
**
*ELEMENT, TYPE=B31, ELSET=TOWER_CROSSBEAM_NORTH_2
201101, 201101, 201102
201102, 201102, 201103
201103, 201103, 201104
201104, 201104, 201105
**
**
*ELEMENT, TYPE=B31, ELSET=TOWER_CROSSBEAM_NORTH_3
201201, 201201, 201202
201202, 201202, 201203
201203, 201203, 201204
201204, 201204, 201205
**
**
*ELEMENT, TYPE=B31, ELSET=TOWER_CROSSBEAM_NORTH_4
201301, 201301, 201302
201302, 201302, 201303
201303, 201303, 201304
201304, 201304, 201305
**
**
*ELEMENT, TYPE=B31, ELSET=TOWER_CROSSBEAM_NORTH_5
201401, 201401, 201402
201402, 201402, 201403
201403, 201403, 201404
201404, 201404, 201405
**
**
*NSET, NSET=TOWER_LEG
TOWER_LEG_SOUTH_EAST
TOWER_LEG_SOUTH_WEST
TOWER_LEG_NORTH_EAST
TOWER_LEG_NORTH_WEST
**
**
*NSET, NSET=TOWER_BASE
100001,110001,200001,210001
**
**
*NSET, NSET=TOWER_TOP_SOUTH_EAST
100075
**
**
*NSET, NSET=TOWER_TOP_SOUTH_WEST
110075
**
**
*NSET, NSET=TOWER_TOP_NORTH_EAST
200075
**
**
*NSET, NSET=TOWER_TOP_NORTH_WEST
210075
**
**
*NSET, NSET=TOWER_CROSSBEAM_SOUTH_1_START
101001
**
**
*NSET, NSET=TOWER_CROSSBEAM_SOUTH_1_END
101008
**
**
*NSET, NSET=TOWER_CROSSBEAM_SOUTH_2_START
101101
**
**
*NSET, NSET=TOWER_CROSSBEAM_SOUTH_2_END
101105
**
**
*NSET, NSET=TOWER_CROSSBEAM_SOUTH_3_START
101201
**
**
*NSET, NSET=TOWER_CROSSBEAM_SOUTH_3_END
101205
**
**
*NSET, NSET=TOWER_CROSSBEAM_SOUTH_4_START
101301
**
**
*NSET, NSET=TOWER_CROSSBEAM_SOUTH_4_END
101305
**
**
*NSET, NSET=TOWER_CROSSBEAM_SOUTH_5_START
101401
**
**
*NSET, NSET=TOWER_CROSSBEAM_SOUTH_5_END
101405
**
**
*NSET, NSET=TOWER_CROSSBEAM_NORTH_1_START
201001
**
**
*NSET, NSET=TOWER_CROSSBEAM_NORTH_1_END
201008
**
**
*NSET, NSET=TOWER_CROSSBEAM_NORTH_2_START
201101
**
**
*NSET, NSET=TOWER_CROSSBEAM_NORTH_2_END
201105
**
**
*NSET, NSET=TOWER_CROSSBEAM_NORTH_3_START
201201
**
**
*NSET, NSET=TOWER_CROSSBEAM_NORTH_3_END
201205
**
**
*NSET, NSET=TOWER_CROSSBEAM_NORTH_4_START
201301
**
**
*NSET, NSET=TOWER_CROSSBEAM_NORTH_4_END
201305
**
**
*NSET, NSET=TOWER_CROSSBEAM_NORTH_5_START
201401
**
**
*NSET, NSET=TOWER_CROSSBEAM_NORTH_5_END
201405
**
**
*ELSET, ELSET=TOWER_LEG
TOWER_LEG_SOUTH_EAST
TOWER_LEG_SOUTH_WEST
TOWER_LEG_NORTH_EAST
TOWER_LEG_NORTH_WEST
**
**
*ELSET, ELSET=TOWER_CROSSBEAM
TOWER_CROSSBEAM_SOUTH_1
TOWER_CROSSBEAM_SOUTH_2
TOWER_CROSSBEAM_SOUTH_3
TOWER_CROSSBEAM_SOUTH_4
TOWER_CROSSBEAM_SOUTH_5
TOWER_CROSSBEAM_NORTH_1
TOWER_CROSSBEAM_NORTH_2
TOWER_CROSSBEAM_NORTH_3
TOWER_CROSSBEAM_NORTH_4
TOWER_CROSSBEAM_NORTH_5
**
**
*ELSET, ELSET=TOWER
TOWER_LEG
TOWER_CROSSBEAM
**
**
*BEAM SECTION, ELSET=TOWER_SOUTH_CS_001, MATERIAL=CONCRETE, SECTION=BOX
12.50000, 14.50000, 1.50000, 1.50000, 1.50000, 1.50000
0.000, 1.000, 0.000
**
*BEAM SECTION, ELSET=TOWER_NORTH_CS_001, MATERIAL=CONCRETE, SECTION=BOX
12.50000, 14.50000, 1.50000, 1.50000, 1.50000, 1.50000
0.000, 1.000, 0.000
**
*BEAM SECTION, ELSET=TOWER_SOUTH_CS_002, MATERIAL=CONCRETE, SECTION=BOX
12.16667, 14.05556, 1.50000, 1.50000, 1.50000, 1.50000
0.000, 1.000, 0.000
**
*BEAM SECTION, ELSET=TOWER_NORTH_CS_002, MATERIAL=CONCRETE, SECTION=BOX
12.16667, 14.05556, 1.50000, 1.50000, 1.50000, 1.50000
0.000, 1.000, 0.000
**
*BEAM SECTION, ELSET=TOWER_SOUTH_CS_003, MATERIAL=CONCRETE, SECTION=BOX
11.83333, 13.61111, 1.50000, 1.50000, 1.50000, 1.50000
0.000, 1.000, 0.000
**
*BEAM SECTION, ELSET=TOWER_NORTH_CS_003, MATERIAL=CONCRETE, SECTION=BOX
11.83333, 13.61111, 1.50000, 1.50000, 1.50000, 1.50000
0.000, 1.000, 0.000
**
*BEAM SECTION, ELSET=TOWER_SOUTH_CS_004, MATERIAL=CONCRETE, SECTION=BOX
11.50000, 13.16667, 1.50000, 1.50000, 1.50000, 1.50000
0.000, 1.000, 0.000
**
*BEAM SECTION, ELSET=TOWER_NORTH_CS_004, MATERIAL=CONCRETE, SECTION=BOX
11.50000, 13.16667, 1.50000, 1.50000, 1.50000, 1.50000
0.000, 1.000, 0.000
**
*BEAM SECTION, ELSET=TOWER_SOUTH_CS_005, MATERIAL=CONCRETE, SECTION=BOX
11.16667, 12.72222, 1.50000, 1.50000, 1.50000, 1.50000
0.000, 1.000, 0.000
**
*BEAM SECTION, ELSET=TOWER_NORTH_CS_005, MATERIAL=CONCRETE, SECTION=BOX
11.16667, 12.72222, 1.50000, 1.50000, 1.50000, 1.50000
0.000, 1.000, 0.000
**
*BEAM SECTION, ELSET=TOWER_SOUTH_CS_006, MATERIAL=CONCRETE, SECTION=BOX
10.83333, 12.27778, 1.50000, 1.50000, 1.50000, 1.50000
0.000, 1.000, 0.000
**
*BEAM SECTION, ELSET=TOWER_NORTH_CS_006, MATERIAL=CONCRETE, SECTION=BOX
10.83333, 12.27778, 1.50000, 1.50000, 1.50000, 1.50000
0.000, 1.000, 0.000
**
*BEAM SECTION, ELSET=TOWER_SOUTH_CS_007, MATERIAL=CONCRETE, SECTION=BOX
10.50000, 11.83333, 1.50000, 1.50000, 1.50000, 1.50000
0.000, 1.000, 0.000
**
*BEAM SECTION, ELSET=TOWER_NORTH_CS_007, MATERIAL=CONCRETE, SECTION=BOX
10.50000, 11.83333, 1.50000, 1.50000, 1.50000, 1.50000
0.000, 1.000, 0.000
**
*BEAM SECTION, ELSET=TOWER_SOUTH_CS_008, MATERIAL=CONCRETE, SECTION=BOX
10.16667, 11.38889, 1.50000, 1.50000, 1.50000, 1.50000
0.000, 1.000, 0.000
**
*BEAM SECTION, ELSET=TOWER_NORTH_CS_008, MATERIAL=CONCRETE, SECTION=BOX
10.16667, 11.38889, 1.50000, 1.50000, 1.50000, 1.50000
0.000, 1.000, 0.000
**
*BEAM SECTION, ELSET=TOWER_SOUTH_CS_009, MATERIAL=CONCRETE, SECTION=BOX
9.83333, 10.94444, 1.50000, 1.50000, 1.50000, 1.50000
0.000, 1.000, 0.000
**
*BEAM SECTION, ELSET=TOWER_NORTH_CS_009, MATERIAL=CONCRETE, SECTION=BOX
9.83333, 10.94444, 1.50000, 1.50000, 1.50000, 1.50000
0.000, 1.000, 0.000
**
*BEAM SECTION, ELSET=TOWER_SOUTH_CS_010, MATERIAL=CONCRETE, SECTION=BOX
9.50000, 10.50000, 1.50000, 1.50000, 1.50000, 1.50000
0.000, 1.000, 0.000
**
*BEAM SECTION, ELSET=TOWER_NORTH_CS_010, MATERIAL=CONCRETE, SECTION=BOX
9.50000, 10.50000, 1.50000, 1.50000, 1.50000, 1.50000
0.000, 1.000, 0.000
**
*BEAM SECTION, ELSET=TOWER_SOUTH_CS_011, MATERIAL=CONCRETE, SECTION=BOX
9.47627, 10.46835, 1.50000, 1.50000, 1.50000, 1.50000
0.000, 1.000, 0.000
**
*BEAM SECTION, ELSET=TOWER_NORTH_CS_011, MATERIAL=CONCRETE, SECTION=BOX
9.47627, 10.46835, 1.50000, 1.50000, 1.50000, 1.50000
0.000, 1.000, 0.000
**
*BEAM SECTION, ELSET=TOWER_SOUTH_CS_012, MATERIAL=CONCRETE, SECTION=BOX
9.45253, 10.43671, 1.50000, 1.50000, 1.50000, 1.50000
0.000, 1.000, 0.000
**
*BEAM SECTION, ELSET=TOWER_NORTH_CS_012, MATERIAL=CONCRETE, SECTION=BOX
9.45253, 10.43671, 1.50000, 1.50000, 1.50000, 1.50000
0.000, 1.000, 0.000
**
*BEAM SECTION, ELSET=TOWER_SOUTH_CS_013, MATERIAL=CONCRETE, SECTION=BOX
9.42880, 10.40506, 1.50000, 1.50000, 1.50000, 1.50000
0.000, 1.000, 0.000
**
*BEAM SECTION, ELSET=TOWER_NORTH_CS_013, MATERIAL=CONCRETE, SECTION=BOX
9.42880, 10.40506, 1.50000, 1.50000, 1.50000, 1.50000
0.000, 1.000, 0.000
**
*BEAM SECTION, ELSET=TOWER_SOUTH_CS_014, MATERIAL=CONCRETE, SECTION=BOX
9.40506, 10.37342, 1.50000, 1.50000, 1.50000, 1.50000
0.000, 1.000, 0.000
**
*BEAM SECTION, ELSET=TOWER_NORTH_CS_014, MATERIAL=CONCRETE, SECTION=BOX
9.40506, 10.37342, 1.50000, 1.50000, 1.50000, 1.50000
0.000, 1.000, 0.000
**
*BEAM SECTION, ELSET=TOWER_SOUTH_CS_015, MATERIAL=CONCRETE, SECTION=BOX
9.38133, 10.34177, 1.50000, 1.50000, 1.50000, 1.50000
0.000, 1.000, 0.000
**
*BEAM SECTION, ELSET=TOWER_NORTH_CS_015, MATERIAL=CONCRETE, SECTION=BOX
9.38133, 10.34177, 1.50000, 1.50000, 1.50000, 1.50000
0.000, 1.000, 0.000
**
*BEAM SECTION, ELSET=TOWER_SOUTH_CS_016, MATERIAL=CONCRETE, SECTION=BOX
9.35759, 10.31013, 1.50000, 1.50000, 1.50000, 1.50000
0.000, 1.000, 0.000
**
*BEAM SECTION, ELSET=TOWER_NORTH_CS_016, MATERIAL=CONCRETE, SECTION=BOX
9.35759, 10.31013, 1.50000, 1.50000, 1.50000, 1.50000
0.000, 1.000, 0.000
**
*BEAM SECTION, ELSET=TOWER_SOUTH_CS_017, MATERIAL=CONCRETE, SECTION=BOX
9.33386, 10.27848, 1.50000, 1.50000, 1.50000, 1.50000
0.000, 1.000, 0.000
**
*BEAM SECTION, ELSET=TOWER_NORTH_CS_017, MATERIAL=CONCRETE, SECTION=BOX
9.33386, 10.27848, 1.50000, 1.50000, 1.50000, 1.50000
0.000, 1.000, 0.000
**
*BEAM SECTION, ELSET=TOWER_SOUTH_CS_018, MATERIAL=CONCRETE, SECTION=BOX
9.31013, 10.24684, 1.50000, 1.50000, 1.50000, 1.50000
0.000, 1.000, 0.000
**
*BEAM SECTION, ELSET=TOWER_NORTH_CS_018, MATERIAL=CONCRETE, SECTION=BOX
9.31013, 10.24684, 1.50000, 1.50000, 1.50000, 1.50000
0.000, 1.000, 0.000
**
*BEAM SECTION, ELSET=TOWER_SOUTH_CS_019, MATERIAL=CONCRETE, SECTION=BOX
9.28639, 10.21519, 1.50000, 1.50000, 1.50000, 1.50000
0.000, 1.000, 0.000
**
*BEAM SECTION, ELSET=TOWER_NORTH_CS_019, MATERIAL=CONCRETE, SECTION=BOX
9.28639, 10.21519, 1.50000, 1.50000, 1.50000, 1.50000
0.000, 1.000, 0.000
**
*BEAM SECTION, ELSET=TOWER_SOUTH_CS_020, MATERIAL=CONCRETE, SECTION=BOX
9.26266, 10.18354, 1.50000, 1.50000, 1.50000, 1.50000
0.000, 1.000, 0.000
**
*BEAM SECTION, ELSET=TOWER_NORTH_CS_020, MATERIAL=CONCRETE, SECTION=BOX
9.26266, 10.18354, 1.50000, 1.50000, 1.50000, 1.50000
0.000, 1.000, 0.000
**
*BEAM SECTION, ELSET=TOWER_SOUTH_CS_021, MATERIAL=CONCRETE, SECTION=BOX
9.23892, 10.15190, 1.50000, 1.50000, 1.50000, 1.50000
0.000, 1.000, 0.000
**
*BEAM SECTION, ELSET=TOWER_NORTH_CS_021, MATERIAL=CONCRETE, SECTION=BOX
9.23892, 10.15190, 1.50000, 1.50000, 1.50000, 1.50000
0.000, 1.000, 0.000
**
*BEAM SECTION, ELSET=TOWER_SOUTH_CS_022, MATERIAL=CONCRETE, SECTION=BOX
9.21519, 10.12025, 1.50000, 1.50000, 1.50000, 1.50000
0.000, 1.000, 0.000
**
*BEAM SECTION, ELSET=TOWER_NORTH_CS_022, MATERIAL=CONCRETE, SECTION=BOX
9.21519, 10.12025, 1.50000, 1.50000, 1.50000, 1.50000
0.000, 1.000, 0.000
**
*BEAM SECTION, ELSET=TOWER_SOUTH_CS_023, MATERIAL=CONCRETE, SECTION=BOX
9.19146, 10.08861, 1.50000, 1.50000, 1.50000, 1.50000
0.000, 1.000, 0.000
**
*BEAM SECTION, ELSET=TOWER_NORTH_CS_023, MATERIAL=CONCRETE, SECTION=BOX
9.19146, 10.08861, 1.50000, 1.50000, 1.50000, 1.50000
0.000, 1.000, 0.000
**
*BEAM SECTION, ELSET=TOWER_SOUTH_CS_024, MATERIAL=CONCRETE, SECTION=BOX
9.16772, 10.05696, 1.50000, 1.50000, 1.50000, 1.50000
0.000, 1.000, 0.000
**
*BEAM SECTION, ELSET=TOWER_NORTH_CS_024, MATERIAL=CONCRETE, SECTION=BOX
9.16772, 10.05696, 1.50000, 1.50000, 1.50000, 1.50000
0.000, 1.000, 0.000
**
*BEAM SECTION, ELSET=TOWER_SOUTH_CS_025, MATERIAL=CONCRETE, SECTION=BOX
9.14399, 10.02532, 1.50000, 1.50000, 1.50000, 1.50000
0.000, 1.000, 0.000
**
*BEAM SECTION, ELSET=TOWER_NORTH_CS_025, MATERIAL=CONCRETE, SECTION=BOX
9.14399, 10.02532, 1.50000, 1.50000, 1.50000, 1.50000
0.000, 1.000, 0.000
**
*BEAM SECTION, ELSET=TOWER_SOUTH_CS_026, MATERIAL=CONCRETE, SECTION=BOX
9.12025, 9.99367, 1.50000, 1.50000, 1.50000, 1.50000
0.000, 1.000, 0.000
**
*BEAM SECTION, ELSET=TOWER_NORTH_CS_026, MATERIAL=CONCRETE, SECTION=BOX
9.12025, 9.99367, 1.50000, 1.50000, 1.50000, 1.50000
0.000, 1.000, 0.000
**
*BEAM SECTION, ELSET=TOWER_SOUTH_CS_027, MATERIAL=CONCRETE, SECTION=BOX
9.09652, 9.96203, 1.50000, 1.50000, 1.50000, 1.50000
0.000, 1.000, 0.000
**
*BEAM SECTION, ELSET=TOWER_NORTH_CS_027, MATERIAL=CONCRETE, SECTION=BOX
9.09652, 9.96203, 1.50000, 1.50000, 1.50000, 1.50000
0.000, 1.000, 0.000
**
*BEAM SECTION, ELSET=TOWER_SOUTH_CS_028, MATERIAL=CONCRETE, SECTION=BOX
9.07278, 9.93038, 1.50000, 1.50000, 1.50000, 1.50000
0.000, 1.000, 0.000
**
*BEAM SECTION, ELSET=TOWER_NORTH_CS_028, MATERIAL=CONCRETE, SECTION=BOX
9.07278, 9.93038, 1.50000, 1.50000, 1.50000, 1.50000
0.000, 1.000, 0.000
**
*BEAM SECTION, ELSET=TOWER_SOUTH_CS_029, MATERIAL=CONCRETE, SECTION=BOX
9.04905, 9.89873, 1.50000, 1.50000, 1.50000, 1.50000
0.000, 1.000, 0.000
**
*BEAM SECTION, ELSET=TOWER_NORTH_CS_029, MATERIAL=CONCRETE, SECTION=BOX
9.04905, 9.89873, 1.50000, 1.50000, 1.50000, 1.50000
0.000, 1.000, 0.000
**
*BEAM SECTION, ELSET=TOWER_SOUTH_CS_030, MATERIAL=CONCRETE, SECTION=BOX
9.02532, 9.86709, 1.50000, 1.50000, 1.50000, 1.50000
0.000, 1.000, 0.000
**
*BEAM SECTION, ELSET=TOWER_NORTH_CS_030, MATERIAL=CONCRETE, SECTION=BOX
9.02532, 9.86709, 1.50000, 1.50000, 1.50000, 1.50000
0.000, 1.000, 0.000
**
*BEAM SECTION, ELSET=TOWER_SOUTH_CS_031, MATERIAL=CONCRETE, SECTION=BOX
9.00158, 9.83544, 1.50000, 1.50000, 1.50000, 1.50000
0.000, 1.000, 0.000
**
*BEAM SECTION, ELSET=TOWER_NORTH_CS_031, MATERIAL=CONCRETE, SECTION=BOX
9.00158, 9.83544, 1.50000, 1.50000, 1.50000, 1.50000
0.000, 1.000, 0.000
**
*BEAM SECTION, ELSET=TOWER_SOUTH_CS_032, MATERIAL=CONCRETE, SECTION=BOX
8.97785, 9.80380, 1.50000, 1.50000, 1.50000, 1.50000
0.000, 1.000, 0.000
**
*BEAM SECTION, ELSET=TOWER_NORTH_CS_032, MATERIAL=CONCRETE, SECTION=BOX
8.97785, 9.80380, 1.50000, 1.50000, 1.50000, 1.50000
0.000, 1.000, 0.000
**
*BEAM SECTION, ELSET=TOWER_SOUTH_CS_033, MATERIAL=CONCRETE, SECTION=BOX
8.95411, 9.77215, 1.50000, 1.50000, 1.50000, 1.50000
0.000, 1.000, 0.000
**
*BEAM SECTION, ELSET=TOWER_NORTH_CS_033, MATERIAL=CONCRETE, SECTION=BOX
8.95411, 9.77215, 1.50000, 1.50000, 1.50000, 1.50000
0.000, 1.000, 0.000
**
*BEAM SECTION, ELSET=TOWER_SOUTH_CS_034, MATERIAL=CONCRETE, SECTION=BOX
8.93038, 9.74051, 1.50000, 1.50000, 1.50000, 1.50000
0.000, 1.000, 0.000
**
*BEAM SECTION, ELSET=TOWER_NORTH_CS_034, MATERIAL=CONCRETE, SECTION=BOX
8.93038, 9.74051, 1.50000, 1.50000, 1.50000, 1.50000
0.000, 1.000, 0.000
**
*BEAM SECTION, ELSET=TOWER_SOUTH_CS_035, MATERIAL=CONCRETE, SECTION=BOX
8.90665, 9.70886, 1.50000, 1.50000, 1.50000, 1.50000
0.000, 1.000, 0.000
**
*BEAM SECTION, ELSET=TOWER_NORTH_CS_035, MATERIAL=CONCRETE, SECTION=BOX
8.90665, 9.70886, 1.50000, 1.50000, 1.50000, 1.50000
0.000, 1.000, 0.000
**
*BEAM SECTION, ELSET=TOWER_SOUTH_CS_036, MATERIAL=CONCRETE, SECTION=BOX
8.88291, 9.67722, 1.50000, 1.50000, 1.50000, 1.50000
0.000, 1.000, 0.000
**
*BEAM SECTION, ELSET=TOWER_NORTH_CS_036, MATERIAL=CONCRETE, SECTION=BOX
8.88291, 9.67722, 1.50000, 1.50000, 1.50000, 1.50000
0.000, 1.000, 0.000
**
*BEAM SECTION, ELSET=TOWER_SOUTH_CS_037, MATERIAL=CONCRETE, SECTION=BOX
8.85918, 9.64557, 1.50000, 1.50000, 1.50000, 1.50000
0.000, 1.000, 0.000
**
*BEAM SECTION, ELSET=TOWER_NORTH_CS_037, MATERIAL=CONCRETE, SECTION=BOX
8.85918, 9.64557, 1.50000, 1.50000, 1.50000, 1.50000
0.000, 1.000, 0.000
**
*BEAM SECTION, ELSET=TOWER_SOUTH_CS_038, MATERIAL=CONCRETE, SECTION=BOX
8.83544, 9.61392, 1.50000, 1.50000, 1.50000, 1.50000
0.000, 1.000, 0.000
**
*BEAM SECTION, ELSET=TOWER_NORTH_CS_038, MATERIAL=CONCRETE, SECTION=BOX
8.83544, 9.61392, 1.50000, 1.50000, 1.50000, 1.50000
0.000, 1.000, 0.000
**
*BEAM SECTION, ELSET=TOWER_SOUTH_CS_039, MATERIAL=CONCRETE, SECTION=BOX
8.81171, 9.58228, 1.50000, 1.50000, 1.50000, 1.50000
0.000, 1.000, 0.000
**
*BEAM SECTION, ELSET=TOWER_NORTH_CS_039, MATERIAL=CONCRETE, SECTION=BOX
8.81171, 9.58228, 1.50000, 1.50000, 1.50000, 1.50000
0.000, 1.000, 0.000
**
*BEAM SECTION, ELSET=TOWER_SOUTH_CS_040, MATERIAL=CONCRETE, SECTION=BOX
8.78797, 9.55063, 1.50000, 1.50000, 1.50000, 1.50000
0.000, 1.000, 0.000
**
*BEAM SECTION, ELSET=TOWER_NORTH_CS_040, MATERIAL=CONCRETE, SECTION=BOX
8.78797, 9.55063, 1.50000, 1.50000, 1.50000, 1.50000
0.000, 1.000, 0.000
**
*BEAM SECTION, ELSET=TOWER_SOUTH_CS_041, MATERIAL=CONCRETE, SECTION=BOX
8.76424, 9.51899, 1.50000, 1.50000, 1.50000, 1.50000
0.000, 1.000, 0.000
**
*BEAM SECTION, ELSET=TOWER_NORTH_CS_041, MATERIAL=CONCRETE, SECTION=BOX
8.76424, 9.51899, 1.50000, 1.50000, 1.50000, 1.50000
0.000, 1.000, 0.000
**
*BEAM SECTION, ELSET=TOWER_SOUTH_CS_042, MATERIAL=CONCRETE, SECTION=BOX
8.74051, 9.48734, 1.50000, 1.50000, 1.50000, 1.50000
0.000, 1.000, 0.000
**
*BEAM SECTION, ELSET=TOWER_NORTH_CS_042, MATERIAL=CONCRETE, SECTION=BOX
8.74051, 9.48734, 1.50000, 1.50000, 1.50000, 1.50000
0.000, 1.000, 0.000
**
*BEAM SECTION, ELSET=TOWER_SOUTH_CS_043, MATERIAL=CONCRETE, SECTION=BOX
8.71677, 9.45570, 1.50000, 1.50000, 1.50000, 1.50000
0.000, 1.000, 0.000
**
*BEAM SECTION, ELSET=TOWER_NORTH_CS_043, MATERIAL=CONCRETE, SECTION=BOX
8.71677, 9.45570, 1.50000, 1.50000, 1.50000, 1.50000
0.000, 1.000, 0.000
**
*BEAM SECTION, ELSET=TOWER_SOUTH_CS_044, MATERIAL=CONCRETE, SECTION=BOX
8.69304, 9.42405, 1.50000, 1.50000, 1.50000, 1.50000
0.000, 1.000, 0.000
**
*BEAM SECTION, ELSET=TOWER_NORTH_CS_044, MATERIAL=CONCRETE, SECTION=BOX
8.69304, 9.42405, 1.50000, 1.50000, 1.50000, 1.50000
0.000, 1.000, 0.000
**
*BEAM SECTION, ELSET=TOWER_SOUTH_CS_045, MATERIAL=CONCRETE, SECTION=BOX
8.66930, 9.39241, 1.50000, 1.50000, 1.50000, 1.50000
0.000, 1.000, 0.000
**
*BEAM SECTION, ELSET=TOWER_NORTH_CS_045, MATERIAL=CONCRETE, SECTION=BOX
8.66930, 9.39241, 1.50000, 1.50000, 1.50000, 1.50000
0.000, 1.000, 0.000
**
*BEAM SECTION, ELSET=TOWER_SOUTH_CS_046, MATERIAL=CONCRETE, SECTION=BOX
8.64557, 9.36076, 1.50000, 1.50000, 1.50000, 1.50000
0.000, 1.000, 0.000
**
*BEAM SECTION, ELSET=TOWER_NORTH_CS_046, MATERIAL=CONCRETE, SECTION=BOX
8.64557, 9.36076, 1.50000, 1.50000, 1.50000, 1.50000
0.000, 1.000, 0.000
**
*BEAM SECTION, ELSET=TOWER_SOUTH_CS_047, MATERIAL=CONCRETE, SECTION=BOX
8.62184, 9.32911, 1.50000, 1.50000, 1.50000, 1.50000
0.000, 1.000, 0.000
**
*BEAM SECTION, ELSET=TOWER_NORTH_CS_047, MATERIAL=CONCRETE, SECTION=BOX
8.62184, 9.32911, 1.50000, 1.50000, 1.50000, 1.50000
0.000, 1.000, 0.000
**
*BEAM SECTION, ELSET=TOWER_SOUTH_CS_048, MATERIAL=CONCRETE, SECTION=BOX
8.59810, 9.29747, 1.50000, 1.50000, 1.50000, 1.50000
0.000, 1.000, 0.000
**
*BEAM SECTION, ELSET=TOWER_NORTH_CS_048, MATERIAL=CONCRETE, SECTION=BOX
8.59810, 9.29747, 1.50000, 1.50000, 1.50000, 1.50000
0.000, 1.000, 0.000
**
*BEAM SECTION, ELSET=TOWER_SOUTH_CS_049, MATERIAL=CONCRETE, SECTION=BOX
8.57437, 9.26582, 1.50000, 1.50000, 1.50000, 1.50000
0.000, 1.000, 0.000
**
*BEAM SECTION, ELSET=TOWER_NORTH_CS_049, MATERIAL=CONCRETE, SECTION=BOX
8.57437, 9.26582, 1.50000, 1.50000, 1.50000, 1.50000
0.000, 1.000, 0.000
**
*BEAM SECTION, ELSET=TOWER_SOUTH_CS_050, MATERIAL=CONCRETE, SECTION=BOX
8.55063, 9.23418, 1.50000, 1.50000, 1.50000, 1.50000
0.000, 1.000, 0.000
**
*BEAM SECTION, ELSET=TOWER_NORTH_CS_050, MATERIAL=CONCRETE, SECTION=BOX
8.55063, 9.23418, 1.50000, 1.50000, 1.50000, 1.50000
0.000, 1.000, 0.000
**
*BEAM SECTION, ELSET=TOWER_SOUTH_CS_051, MATERIAL=CONCRETE, SECTION=BOX
8.52690, 9.20253, 1.50000, 1.50000, 1.50000, 1.50000
0.000, 1.000, 0.000
**
*BEAM SECTION, ELSET=TOWER_NORTH_CS_051, MATERIAL=CONCRETE, SECTION=BOX
8.52690, 9.20253, 1.50000, 1.50000, 1.50000, 1.50000
0.000, 1.000, 0.000
**
*BEAM SECTION, ELSET=TOWER_SOUTH_CS_052, MATERIAL=CONCRETE, SECTION=BOX
8.50316, 9.17089, 1.50000, 1.50000, 1.50000, 1.50000
0.000, 1.000, 0.000
**
*BEAM SECTION, ELSET=TOWER_NORTH_CS_052, MATERIAL=CONCRETE, SECTION=BOX
8.50316, 9.17089, 1.50000, 1.50000, 1.50000, 1.50000
0.000, 1.000, 0.000
**
*BEAM SECTION, ELSET=TOWER_SOUTH_CS_053, MATERIAL=CONCRETE, SECTION=BOX
8.47943, 9.13924, 1.50000, 1.50000, 1.50000, 1.50000
0.000, 1.000, 0.000
**
*BEAM SECTION, ELSET=TOWER_NORTH_CS_053, MATERIAL=CONCRETE, SECTION=BOX
8.47943, 9.13924, 1.50000, 1.50000, 1.50000, 1.50000
0.000, 1.000, 0.000
**
*BEAM SECTION, ELSET=TOWER_SOUTH_CS_054, MATERIAL=CONCRETE, SECTION=BOX
8.45570, 9.10759, 1.50000, 1.50000, 1.50000, 1.50000
0.000, 1.000, 0.000
**
*BEAM SECTION, ELSET=TOWER_NORTH_CS_054, MATERIAL=CONCRETE, SECTION=BOX
8.45570, 9.10759, 1.50000, 1.50000, 1.50000, 1.50000
0.000, 1.000, 0.000
**
*BEAM SECTION, ELSET=TOWER_SOUTH_CS_055, MATERIAL=CONCRETE, SECTION=BOX
8.43196, 9.07595, 1.50000, 1.50000, 1.50000, 1.50000
0.000, 1.000, 0.000
**
*BEAM SECTION, ELSET=TOWER_NORTH_CS_055, MATERIAL=CONCRETE, SECTION=BOX
8.43196, 9.07595, 1.50000, 1.50000, 1.50000, 1.50000
0.000, 1.000, 0.000
**
*BEAM SECTION, ELSET=TOWER_SOUTH_CS_056, MATERIAL=CONCRETE, SECTION=BOX
8.40823, 9.04430, 1.50000, 1.50000, 1.50000, 1.50000
0.000, 1.000, 0.000
**
*BEAM SECTION, ELSET=TOWER_NORTH_CS_056, MATERIAL=CONCRETE, SECTION=BOX
8.40823, 9.04430, 1.50000, 1.50000, 1.50000, 1.50000
0.000, 1.000, 0.000
**
*BEAM SECTION, ELSET=TOWER_SOUTH_CS_057, MATERIAL=CONCRETE, SECTION=BOX
8.38449, 9.01266, 1.50000, 1.50000, 1.50000, 1.50000
0.000, 1.000, 0.000
**
*BEAM SECTION, ELSET=TOWER_NORTH_CS_057, MATERIAL=CONCRETE, SECTION=BOX
8.38449, 9.01266, 1.50000, 1.50000, 1.50000, 1.50000
0.000, 1.000, 0.000
**
*BEAM SECTION, ELSET=TOWER_SOUTH_CS_058, MATERIAL=CONCRETE, SECTION=BOX
8.36076, 8.98101, 1.50000, 1.50000, 1.50000, 1.50000
0.000, 1.000, 0.000
**
*BEAM SECTION, ELSET=TOWER_NORTH_CS_058, MATERIAL=CONCRETE, SECTION=BOX
8.36076, 8.98101, 1.50000, 1.50000, 1.50000, 1.50000
0.000, 1.000, 0.000
**
*BEAM SECTION, ELSET=TOWER_SOUTH_CS_059, MATERIAL=CONCRETE, SECTION=BOX
8.33703, 8.94937, 1.50000, 1.50000, 1.50000, 1.50000
0.000, 1.000, 0.000
**
*BEAM SECTION, ELSET=TOWER_NORTH_CS_059, MATERIAL=CONCRETE, SECTION=BOX
8.33703, 8.94937, 1.50000, 1.50000, 1.50000, 1.50000
0.000, 1.000, 0.000
**
*BEAM SECTION, ELSET=TOWER_SOUTH_CS_060, MATERIAL=CONCRETE, SECTION=BOX
8.31329, 8.91772, 1.50000, 1.50000, 1.50000, 1.50000
0.000, 1.000, 0.000
**
*BEAM SECTION, ELSET=TOWER_NORTH_CS_060, MATERIAL=CONCRETE, SECTION=BOX
8.31329, 8.91772, 1.50000, 1.50000, 1.50000, 1.50000
0.000, 1.000, 0.000
**
*BEAM SECTION, ELSET=TOWER_SOUTH_CS_061, MATERIAL=CONCRETE, SECTION=BOX
8.28956, 8.88608, 1.50000, 1.50000, 1.50000, 1.50000
0.000, 1.000, 0.000
**
*BEAM SECTION, ELSET=TOWER_NORTH_CS_061, MATERIAL=CONCRETE, SECTION=BOX
8.28956, 8.88608, 1.50000, 1.50000, 1.50000, 1.50000
0.000, 1.000, 0.000
**
*BEAM SECTION, ELSET=TOWER_SOUTH_CS_062, MATERIAL=CONCRETE, SECTION=BOX
8.26582, 8.85443, 1.50000, 1.50000, 1.50000, 1.50000
0.000, 1.000, 0.000
**
*BEAM SECTION, ELSET=TOWER_NORTH_CS_062, MATERIAL=CONCRETE, SECTION=BOX
8.26582, 8.85443, 1.50000, 1.50000, 1.50000, 1.50000
0.000, 1.000, 0.000
**
*BEAM SECTION, ELSET=TOWER_SOUTH_CS_063, MATERIAL=CONCRETE, SECTION=BOX
8.24209, 8.82278, 1.50000, 1.50000, 1.50000, 1.50000
0.000, 1.000, 0.000
**
*BEAM SECTION, ELSET=TOWER_NORTH_CS_063, MATERIAL=CONCRETE, SECTION=BOX
8.24209, 8.82278, 1.50000, 1.50000, 1.50000, 1.50000
0.000, 1.000, 0.000
**
*BEAM SECTION, ELSET=TOWER_SOUTH_CS_064, MATERIAL=CONCRETE, SECTION=BOX
8.21835, 8.79114, 1.50000, 1.50000, 1.50000, 1.50000
0.000, 1.000, 0.000
**
*BEAM SECTION, ELSET=TOWER_NORTH_CS_064, MATERIAL=CONCRETE, SECTION=BOX
8.21835, 8.79114, 1.50000, 1.50000, 1.50000, 1.50000
0.000, 1.000, 0.000
**
*BEAM SECTION, ELSET=TOWER_SOUTH_CS_065, MATERIAL=CONCRETE, SECTION=BOX
8.19462, 8.75949, 1.50000, 1.50000, 1.50000, 1.50000
0.000, 1.000, 0.000
**
*BEAM SECTION, ELSET=TOWER_NORTH_CS_065, MATERIAL=CONCRETE, SECTION=BOX
8.19462, 8.75949, 1.50000, 1.50000, 1.50000, 1.50000
0.000, 1.000, 0.000
**
*BEAM SECTION, ELSET=TOWER_SOUTH_CS_066, MATERIAL=CONCRETE, SECTION=BOX
8.17089, 8.72785, 1.50000, 1.50000, 1.50000, 1.50000
0.000, 1.000, 0.000
**
*BEAM SECTION, ELSET=TOWER_NORTH_CS_066, MATERIAL=CONCRETE, SECTION=BOX
8.17089, 8.72785, 1.50000, 1.50000, 1.50000, 1.50000
0.000, 1.000, 0.000
**
*BEAM SECTION, ELSET=TOWER_SOUTH_CS_067, MATERIAL=CONCRETE, SECTION=BOX
8.14715, 8.69620, 1.50000, 1.50000, 1.50000, 1.50000
0.000, 1.000, 0.000
**
*BEAM SECTION, ELSET=TOWER_NORTH_CS_067, MATERIAL=CONCRETE, SECTION=BOX
8.14715, 8.69620, 1.50000, 1.50000, 1.50000, 1.50000
0.000, 1.000, 0.000
**
*BEAM SECTION, ELSET=TOWER_SOUTH_CS_068, MATERIAL=CONCRETE, SECTION=BOX
8.12342, 8.66456, 1.50000, 1.50000, 1.50000, 1.50000
0.000, 1.000, 0.000
**
*BEAM SECTION, ELSET=TOWER_NORTH_CS_068, MATERIAL=CONCRETE, SECTION=BOX
8.12342, 8.66456, 1.50000, 1.50000, 1.50000, 1.50000
0.000, 1.000, 0.000
**
*BEAM SECTION, ELSET=TOWER_SOUTH_CS_069, MATERIAL=CONCRETE, SECTION=BOX
8.09968, 8.63291, 1.50000, 1.50000, 1.50000, 1.50000
0.000, 1.000, 0.000
**
*BEAM SECTION, ELSET=TOWER_NORTH_CS_069, MATERIAL=CONCRETE, SECTION=BOX
8.09968, 8.63291, 1.50000, 1.50000, 1.50000, 1.50000
0.000, 1.000, 0.000
**
*BEAM SECTION, ELSET=TOWER_SOUTH_CS_070, MATERIAL=CONCRETE, SECTION=BOX
8.07595, 8.60127, 1.50000, 1.50000, 1.50000, 1.50000
0.000, 1.000, 0.000
**
*BEAM SECTION, ELSET=TOWER_NORTH_CS_070, MATERIAL=CONCRETE, SECTION=BOX
8.07595, 8.60127, 1.50000, 1.50000, 1.50000, 1.50000
0.000, 1.000, 0.000
**
*BEAM SECTION, ELSET=TOWER_SOUTH_CS_071, MATERIAL=CONCRETE, SECTION=BOX
8.05222, 8.56962, 1.50000, 1.50000, 1.50000, 1.50000
0.000, 1.000, 0.000
**
*BEAM SECTION, ELSET=TOWER_NORTH_CS_071, MATERIAL=CONCRETE, SECTION=BOX
8.05222, 8.56962, 1.50000, 1.50000, 1.50000, 1.50000
0.000, 1.000, 0.000
**
*BEAM SECTION, ELSET=TOWER_SOUTH_CS_072, MATERIAL=CONCRETE, SECTION=BOX
8.02848, 8.53797, 1.50000, 1.50000, 1.50000, 1.50000
0.000, 1.000, 0.000
**
*BEAM SECTION, ELSET=TOWER_NORTH_CS_072, MATERIAL=CONCRETE, SECTION=BOX
8.02848, 8.53797, 1.50000, 1.50000, 1.50000, 1.50000
0.000, 1.000, 0.000
**
*BEAM SECTION, ELSET=TOWER_SOUTH_CS_073, MATERIAL=CONCRETE, SECTION=BOX
8.00475, 8.50633, 1.50000, 1.50000, 1.50000, 1.50000
0.000, 1.000, 0.000
**
*BEAM SECTION, ELSET=TOWER_NORTH_CS_073, MATERIAL=CONCRETE, SECTION=BOX
8.00475, 8.50633, 1.50000, 1.50000, 1.50000, 1.50000
0.000, 1.000, 0.000
**
*BEAM SECTION, ELSET=TOWER_SOUTH_CS_074, MATERIAL=CONCRETE, SECTION=BOX
8.00000, 8.50000, 1.50000, 1.50000, 1.50000, 1.50000
0.000, 1.000, 0.000
**
*BEAM SECTION, ELSET=TOWER_NORTH_CS_074, MATERIAL=CONCRETE, SECTION=BOX
8.00000, 8.50000, 1.50000, 1.50000, 1.50000, 1.50000
0.000, 1.000, 0.000
**
*BEAM SECTION, ELSET=TOWER_CROSSBEAM_SOUTH_1, MATERIAL=CONCRETE, SECTION=BOX
5.00000, 8.00000, 1.00000, 1.00000, 1.00000, 1.00000
1.000, 0.000, 0.000
*BEAM SECTION, ELSET=TOWER_CROSSBEAM_NORTH_1, MATERIAL=CONCRETE, SECTION=BOX
5.00000, 8.00000, 1.00000, 1.00000, 1.00000, 1.00000
1.000, 0.000, 0.000
**
*BEAM SECTION, ELSET=TOWER_CROSSBEAM_SOUTH_2, MATERIAL=CONCRETE, SECTION=BOX
5.00000, 8.00000, 1.00000, 1.00000, 1.00000, 1.00000
1.000, 0.000, 0.000
*BEAM SECTION, ELSET=TOWER_CROSSBEAM_NORTH_2, MATERIAL=CONCRETE, SECTION=BOX
5.00000, 8.00000, 1.00000, 1.00000, 1.00000, 1.00000
1.000, 0.000, 0.000
**
*BEAM SECTION, ELSET=TOWER_CROSSBEAM_SOUTH_3, MATERIAL=CONCRETE, SECTION=BOX
5.00000, 8.00000, 1.00000, 1.00000, 1.00000, 1.00000
1.000, 0.000, 0.000
*BEAM SECTION, ELSET=TOWER_CROSSBEAM_NORTH_3, MATERIAL=CONCRETE, SECTION=BOX
5.00000, 8.00000, 1.00000, 1.00000, 1.00000, 1.00000
1.000, 0.000, 0.000
**
*BEAM SECTION, ELSET=TOWER_CROSSBEAM_SOUTH_4, MATERIAL=CONCRETE, SECTION=BOX
5.00000, 8.00000, 1.00000, 1.00000, 1.00000, 1.00000
1.000, 0.000, 0.000
*BEAM SECTION, ELSET=TOWER_CROSSBEAM_NORTH_4, MATERIAL=CONCRETE, SECTION=BOX
5.00000, 8.00000, 1.00000, 1.00000, 1.00000, 1.00000
1.000, 0.000, 0.000
**
*BEAM SECTION, ELSET=TOWER_CROSSBEAM_SOUTH_5, MATERIAL=CONCRETE, SECTION=BOX
5.00000, 8.00000, 1.00000, 1.00000, 1.00000, 1.00000
1.000, 0.000, 0.000
*BEAM SECTION, ELSET=TOWER_CROSSBEAM_NORTH_5, MATERIAL=CONCRETE, SECTION=BOX
5.00000, 8.00000, 1.00000, 1.00000, 1.00000, 1.00000
1.000, 0.000, 0.000
**
*NSET, NSET=TOWER_LEG_SOUTH_CROSSBEAM_1_START
100005
**
**
*MPC
BEAM, Tower_crossbeam_south_1_start,Tower_leg_south_crossbeam_1_start
**
*NSET, NSET=TOWER_LEG_SOUTH_CROSSBEAM_1_END
110005
**
**
*MPC
BEAM, Tower_crossbeam_south_1_end,Tower_leg_south_crossbeam_1_end
**
*NSET, NSET=TOWER_LEG_SOUTH_CROSSBEAM_2_START
100030
**
**
*MPC
BEAM, Tower_crossbeam_south_2_start,Tower_leg_south_crossbeam_2_start
**
*NSET, NSET=TOWER_LEG_SOUTH_CROSSBEAM_2_END
110030
**
**
*MPC
BEAM, Tower_crossbeam_south_2_end,Tower_leg_south_crossbeam_2_end
**
*NSET, NSET=TOWER_LEG_SOUTH_CROSSBEAM_3_START
100044
**
**
*MPC
BEAM, Tower_crossbeam_south_3_start,Tower_leg_south_crossbeam_3_start
**
*NSET, NSET=TOWER_LEG_SOUTH_CROSSBEAM_3_END
110044
**
**
*MPC
BEAM, Tower_crossbeam_south_3_end,Tower_leg_south_crossbeam_3_end
**
*NSET, NSET=TOWER_LEG_SOUTH_CROSSBEAM_4_START
100058
**
**
*MPC
BEAM, Tower_crossbeam_south_4_start,Tower_leg_south_crossbeam_4_start
**
*NSET, NSET=TOWER_LEG_SOUTH_CROSSBEAM_4_END
110058
**
**
*MPC
BEAM, Tower_crossbeam_south_4_end,Tower_leg_south_crossbeam_4_end
**
*NSET, NSET=TOWER_LEG_SOUTH_CROSSBEAM_5_START
100072
**
**
*MPC
BEAM, Tower_crossbeam_south_5_start,Tower_leg_south_crossbeam_5_start
**
*NSET, NSET=TOWER_LEG_SOUTH_CROSSBEAM_5_END
110072
**
**
*MPC
BEAM, Tower_crossbeam_south_5_end,Tower_leg_south_crossbeam_5_end
**
*NSET, NSET=TOWER_LEG_NORTH_CROSSBEAM_1_START
200005
**
**
*MPC
BEAM, Tower_crossbeam_north_1_start,Tower_leg_north_crossbeam_1_start
**
*NSET, NSET=TOWER_LEG_NORTH_CROSSBEAM_1_END
210005
**
**
*MPC
BEAM, Tower_crossbeam_north_1_end,Tower_leg_north_crossbeam_1_end
**
*NSET, NSET=TOWER_LEG_NORTH_CROSSBEAM_2_START
200030
**
**
*MPC
BEAM, Tower_crossbeam_north_2_start,Tower_leg_north_crossbeam_2_start
**
*NSET, NSET=TOWER_LEG_NORTH_CROSSBEAM_2_END
210030
**
**
*MPC
BEAM, Tower_crossbeam_north_2_end,Tower_leg_north_crossbeam_2_end
**
*NSET, NSET=TOWER_LEG_NORTH_CROSSBEAM_3_START
200044
**
**
*MPC
BEAM, Tower_crossbeam_north_3_start,Tower_leg_north_crossbeam_3_start
**
*NSET, NSET=TOWER_LEG_NORTH_CROSSBEAM_3_END
210044
**
**
*MPC
BEAM, Tower_crossbeam_north_3_end,Tower_leg_north_crossbeam_3_end
**
*NSET, NSET=TOWER_LEG_NORTH_CROSSBEAM_4_START
200058
**
**
*MPC
BEAM, Tower_crossbeam_north_4_start,Tower_leg_north_crossbeam_4_start
**
*NSET, NSET=TOWER_LEG_NORTH_CROSSBEAM_4_END
210058
**
**
*MPC
BEAM, Tower_crossbeam_north_4_end,Tower_leg_north_crossbeam_4_end
**
*NSET, NSET=TOWER_LEG_NORTH_CROSSBEAM_5_START
200072
**
**
*MPC
BEAM, Tower_crossbeam_north_5_start,Tower_leg_north_crossbeam_5_start
**
*NSET, NSET=TOWER_LEG_NORTH_CROSSBEAM_5_END
210072
**
**
*MPC
BEAM, Tower_crossbeam_north_5_end,Tower_leg_north_crossbeam_5_end
**
***********************************************************
** SADLE
***********************************************************
*ELEMENT, TYPE=SPRING2, ELSET=SADLESPRING_X
300000,100075,10051
300001,110075,20051
300002,200075,10169
300003,210075,20169
*SPRING, ELSET=SADLESPRING_X
1,1
1.00000e+12
**
**
*ELEMENT, TYPE=SPRING2, ELSET=SADLESPRING_Y
301000,100075,10051
301001,110075,20051
301002,200075,10169
301003,210075,20169
*SPRING, ELSET=SADLESPRING_Y
2,2
1.00000e+12
**
**
*ELEMENT, TYPE=SPRING2, ELSET=SADLESPRING_Z
302000,100075,10051
302001,110075,20051
302002,200075,10169
302003,210075,20169
*SPRING, ELSET=SADLESPRING_Z
3,3
1.00000e+12
**
**
*ELSET, ELSET=SADLESPRING
SADLESPRING_X
SADLESPRING_Y
SADLESPRING_Z
**
**
***********************************************************
** BRIDGE DECK
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**
**
*ELEMENT, TYPE=B31, ELSET=BRIDGEDECK1_COG
1001, 1001, 1002
1002, 1002, 1003
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**
**
*ELEMENT, TYPE=B31, ELSET=BRIDGEDECK2_COG
2001, 2001, 2002
2002, 2002, 2003
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**
**
*ELEMENT, TYPE=B31, ELSET=LATCONNOUTEREAST
3001, 1001, 11001
3002, 1003, 11003
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**
**
*ELEMENT, TYPE=B31, ELSET=LATCONNOUTERWEST
4001, 2001, 12001
4002, 2003, 12003
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**
**
*ELEMENT, TYPE=B31, ELSET=LATCONNINNEREAST
5001, 1001, 3001
5002, 1003, 3003
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**
**
*ELEMENT, TYPE=B31, ELSET=LATCONNINNERWEST
6001, 2001, 4001
6002, 2003, 4003
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**
**
*ELEMENT, TYPE=B31, ELSET=LATCONNGAPEAST
7001, 5001, 3001
7002, 5003, 3003
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**
**
*ELEMENT, TYPE=B31, ELSET=LATCONNGAPWEST
8001, 5001, 4001
8002, 5003, 4003
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**
**
*ELEMENT, TYPE=S4R, ELSET=BRIDGEDECK_SHELL
910001, 11001, 1001, 1003, 11003
910002, 11003, 1003, 1009, 11009
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**
**
*ELSET, ELSET=BRIDGEDECK_COG
BRIDGEDECK1_COG
BRIDGEDECK2_COG
**
**
*ELSET, ELSET=LATCONNOUTER
LATCONNOUTEREAST
LATCONNOUTERWEST
**
**
*ELSET, ELSET=LATCONNINNER
LATCONNINNEREAST
LATCONNINNERWEST
**
**
*ELSET, ELSET=LATCONNGAP
LATCONNGAPWEST
LATCONNGAPEAST
**
**
*ELSET, ELSET=BRIDGEDECK
BRIDGEDECK_COG
LATCONNOUTER
LATCONNINNER
LATCONNGAP
**
**
*BEAM GENERAL SECTION, ELSET=LATCONNOUTER, SECTION=GENERAL, DENSITY=0.000
1.00000e-01, 1.00000e+00, 0.00000e+00, 1.00000e+00, 1.00000e+00
1.000, 0.000, 0.000
2.10000e+12, 8.10000e+11
**
*BEAM GENERAL SECTION, ELSET=BRIDGEDECK1_COG, SECTION=GENERAL, DENSITY=0.000
7.30000e-01, 6.40000e-01, 0.00000e+00, 1.71400e+01, 1.85000e+00
0.000, 1.000, 0.000
2.10000e+11, 8.10000e+10
**
*BEAM ADDED INERTIA
9.300e+03, 0.000e+00, 0.000e+00, 0.000e+00, 6.400e+04, 1.200e+06, 0.000e+0
*SHEAR CENTER
2.130e+00,-2.000e-01
**
*BEAM GENERAL SECTION, ELSET=BRIDGEDECK2_COG, SECTION=GENERAL, DENSITY=0.000
7.30000e-01, 6.40000e-01, 0.00000e+00, 1.71400e+01, 1.85000e+00
0.000, 1.000, 0.000
2.10000e+11, 8.10000e+10
**
*BEAM ADDED INERTIA
9.300e+03, 0.000e+00, 0.000e+00, 0.000e+00, 6.400e+04, 1.200e+06, 0.000e+0
*SHEAR CENTER
-2.130e+00,-2.000e-01
**
*BEAM GENERAL SECTION, ELSET=LATCONNINNER, SECTION=GENERAL, DENSITY=0.000
1.00000e-01, 1.00000e+00, 0.00000e+00, 1.00000e+00, 1.00000e+00
1.000, 0.000, 0.000
2.10000e+12, 8.10000e+11
**
*BEAM SECTION, ELSET=LATCONNGAP, MATERIAL=STEEL, SECTION=BOX
2.00000, 2.00000, 0.02000, 0.02000, 0.02000, 0.02000
1.000, 0.000, 0.000
**
*SHELL SECTION, ELSET=BRIDGEDECK_SHELL, MATERIAL=SOFT, OFFSET=SNEG
0.010,3
**
***********************************************************
** HANGER
***********************************************************
*ELEMENT, TYPE=B31, ELSET=HANGER_EAST
80001, 11003, 10052
80002, 11009, 10053
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**
**
*ELEMENT, TYPE=B31, ELSET=HANGER_WEST
90001, 12003, 20052
90002, 12009, 20053
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**
**
*ELSET, ELSET=HANGER
HANGER_EAST
HANGER_WEST
**
**
*BEAM GENERAL SECTION, ELSET=HANGER, SECTION=GENERAL, DENSITY=7850.000
4.00000e-03, 1.00000e-07, 0.00000e+00, 1.00000e-07, 1.00000e-07
0.000, 1.000, 0.000
1.60000e+11, 6.00000e+10
**
*RELEASE
Hanger, S1, M1-M2
Hanger, S2, M1-M2
**
***********************************************************
** BEARINGS
***********************************************************
*ELEMENT, TYPE=SPRING2, ELSET=BEARINGSPRING1_SOUTH_X
410001,400005,400002
*SPRING, ELSET=BEARINGSPRING1_SOUTH_X
1,1
3.00000e+07
**
**
*ELEMENT, TYPE=SPRING2, ELSET=BEARINGSPRING1_SOUTH_Y
410002,400005,400002
*SPRING, ELSET=BEARINGSPRING1_SOUTH_Y
2,2
1.00000e+12
**
**
*ELEMENT, TYPE=SPRING2, ELSET=BEARINGSPRING1_SOUTH_Z
410003,400005,400002
*SPRING, ELSET=BEARINGSPRING1_SOUTH_Z
3,3
1.00000e+06
**
**
*ELEMENT, TYPE=SPRING2, ELSET=BEARINGSPRING1_SOUTH_RX
410004,400005,400002
*SPRING, ELSET=BEARINGSPRING1_SOUTH_RX
4,4
1.00000e+00
**
**
*ELEMENT, TYPE=SPRING2, ELSET=BEARINGSPRING1_SOUTH_RY
410005,400005,400002
*SPRING, ELSET=BEARINGSPRING1_SOUTH_RY
5,5
1.00000e+00
**
**
*ELEMENT, TYPE=SPRING2, ELSET=BEARINGSPRING1_SOUTH_RZ
410006,400005,400002
*SPRING, ELSET=BEARINGSPRING1_SOUTH_RZ
6,6
1.00000e+00
**
**
*ELEMENT, TYPE=SPRING2, ELSET=BEARINGSPRING1_NORTH_X
410101,400105,400102
*SPRING, ELSET=BEARINGSPRING1_NORTH_X
1,1
3.00000e+07
**
**
*ELEMENT, TYPE=SPRING2, ELSET=BEARINGSPRING1_NORTH_Y
410102,400105,400102
*SPRING, ELSET=BEARINGSPRING1_NORTH_Y
2,2
1.00000e+12
**
**
*ELEMENT, TYPE=SPRING2, ELSET=BEARINGSPRING1_NORTH_Z
410103,400105,400102
*SPRING, ELSET=BEARINGSPRING1_NORTH_Z
3,3
1.00000e+06
**
**
*ELEMENT, TYPE=SPRING2, ELSET=BEARINGSPRING1_NORTH_RX
410104,400105,400102
*SPRING, ELSET=BEARINGSPRING1_NORTH_RX
4,4
1.00000e+00
**
**
*ELEMENT, TYPE=SPRING2, ELSET=BEARINGSPRING1_NORTH_RY
410105,400105,400102
*SPRING, ELSET=BEARINGSPRING1_NORTH_RY
5,5
1.00000e+00
**
**
*ELEMENT, TYPE=SPRING2, ELSET=BEARINGSPRING1_NORTH_RZ
410106,400105,400102
*SPRING, ELSET=BEARINGSPRING1_NORTH_RZ
6,6
1.00000e+00
**
**
*ELEMENT, TYPE=SPRING2, ELSET=BEARINGSPRING2_SOUTH_X
411001,401005,401002
*SPRING, ELSET=BEARINGSPRING2_SOUTH_X
1,1
3.00000e+07
**
**
*ELEMENT, TYPE=SPRING2, ELSET=BEARINGSPRING2_SOUTH_Y
411002,401005,401002
*SPRING, ELSET=BEARINGSPRING2_SOUTH_Y
2,2
1.00000e+12
**
**
*ELEMENT, TYPE=SPRING2, ELSET=BEARINGSPRING2_SOUTH_Z
411003,401005,401002
*SPRING, ELSET=BEARINGSPRING2_SOUTH_Z
3,3
1.00000e+06
**
**
*ELEMENT, TYPE=SPRING2, ELSET=BEARINGSPRING2_SOUTH_RX
411004,401005,401002
*SPRING, ELSET=BEARINGSPRING2_SOUTH_RX
4,4
1.00000e+00
**
**
*ELEMENT, TYPE=SPRING2, ELSET=BEARINGSPRING2_SOUTH_RY
411005,401005,401002
*SPRING, ELSET=BEARINGSPRING2_SOUTH_RY
5,5
1.00000e+00
**
**
*ELEMENT, TYPE=SPRING2, ELSET=BEARINGSPRING2_SOUTH_RZ
411006,401005,401002
*SPRING, ELSET=BEARINGSPRING2_SOUTH_RZ
6,6
1.00000e+00
**
**
*ELEMENT, TYPE=SPRING2, ELSET=BEARINGSPRING2_NORTH_X
411101,401105,401102
*SPRING, ELSET=BEARINGSPRING2_NORTH_X
1,1
3.00000e+07
**
**
*ELEMENT, TYPE=SPRING2, ELSET=BEARINGSPRING2_NORTH_Y
411102,401105,401102
*SPRING, ELSET=BEARINGSPRING2_NORTH_Y
2,2
1.00000e+12
**
**
*ELEMENT, TYPE=SPRING2, ELSET=BEARINGSPRING2_NORTH_Z
411103,401105,401102
*SPRING, ELSET=BEARINGSPRING2_NORTH_Z
3,3
1.00000e+06
**
**
*ELEMENT, TYPE=SPRING2, ELSET=BEARINGSPRING2_NORTH_RX
411104,401105,401102
*SPRING, ELSET=BEARINGSPRING2_NORTH_RX
4,4
1.00000e+00
**
**
*ELEMENT, TYPE=SPRING2, ELSET=BEARINGSPRING2_NORTH_RY
411105,401105,401102
*SPRING, ELSET=BEARINGSPRING2_NORTH_RY
5,5
1.00000e+00
**
**
*ELEMENT, TYPE=SPRING2, ELSET=BEARINGSPRING2_NORTH_RZ
411106,401105,401102
*SPRING, ELSET=BEARINGSPRING2_NORTH_RZ
6,6
1.00000e+00
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**
**
*ELEMENT, TYPE=B31, ELSET=BEARINGTOP1_SOUTH
400001, 11001, 400001
400002, 400001, 400002
400003, 400002, 400003
400004, 400003, 3001
400005, 1001, 400002
**
**
*ELEMENT, TYPE=B31, ELSET=BEARINGLOW1_SOUTH
400006, 101002, 400004
400007, 101003, 400005
400008, 101004, 400006
**
**
*ELEMENT, TYPE=B31, ELSET=BEARINGPENDULUM1_SOUTH
400009, 400004, 400001
400010, 400006, 400003
**
**
*ELEMENT, TYPE=B31, ELSET=BEARINGTOP1_NORTH
400101, 11701, 400101
400102, 400101, 400102
400103, 400102, 400103
400104, 400103, 3701
400105, 1701, 400102
**
**
*ELEMENT, TYPE=B31, ELSET=BEARINGLOW1_NORTH
400106, 201002, 400104
400107, 201003, 400105
400108, 201004, 400106
**
**
*ELEMENT, TYPE=B31, ELSET=BEARINGPENDULUM1_NORTH
400109, 400104, 400101
400110, 400106, 400103
**
**
*ELEMENT, TYPE=B31, ELSET=BEARINGTOP2_SOUTH
401001, 4001, 401001
401002, 401001, 401002
401003, 401002, 401003
401004, 401003, 12001
401005, 2001, 401002
**
**
*ELEMENT, TYPE=B31, ELSET=BEARINGLOW2_SOUTH
401006, 101005, 401004
401007, 101006, 401005
401008, 101007, 401006
**
**
*ELEMENT, TYPE=B31, ELSET=BEARINGPENDULUM2_SOUTH
401009, 401004, 401001
401010, 401006, 401003
**
**
*ELEMENT, TYPE=B31, ELSET=BEARINGTOP2_NORTH
401101, 4701, 401101
401102, 401101, 401102
401103, 401102, 401103
401104, 401103, 12701
401105, 2701, 401102
**
**
*ELEMENT, TYPE=B31, ELSET=BEARINGLOW2_NORTH
401106, 201005, 401104
401107, 201006, 401105
401108, 201007, 401106
**
**
*ELEMENT, TYPE=B31, ELSET=BEARINGPENDULUM2_NORTH
401109, 401104, 401101
401110, 401106, 401103
**
**
*ELSET, ELSET=BEARINGSPRING1_SOUTH
BEARINGSPRING1_SOUTH_X
BEARINGSPRING1_SOUTH_Y
BEARINGSPRING1_SOUTH_Z
BEARINGSPRING1_SOUTH_RX
BEARINGSPRING1_SOUTH_RY
BEARINGSPRING1_SOUTH_RZ
**
**
*ELSET, ELSET=BEARINGSPRING1_NORTH
BEARINGSPRING1_NORTH_X
BEARINGSPRING1_NORTH_Y
BEARINGSPRING1_NORTH_Z
BEARINGSPRING1_NORTH_RX
BEARINGSPRING1_NORTH_RY
BEARINGSPRING1_NORTH_RZ
**
**
*ELSET, ELSET=BEARINGSPRING2_SOUTH
BEARINGSPRING2_SOUTH_X
BEARINGSPRING2_SOUTH_Y
BEARINGSPRING2_SOUTH_Z
BEARINGSPRING2_SOUTH_RX
BEARINGSPRING2_SOUTH_RY
BEARINGSPRING2_SOUTH_RZ
**
**
*ELSET, ELSET=BEARINGSPRING2_NORTH
BEARINGSPRING2_NORTH_X
BEARINGSPRING2_NORTH_Y
BEARINGSPRING2_NORTH_Z
BEARINGSPRING2_NORTH_RX
BEARINGSPRING2_NORTH_RY
BEARINGSPRING2_NORTH_RZ
**
**
*ELSET, ELSET=BEARINGTOP
BEARINGTOP1_SOUTH
BEARINGTOP1_NORTH
BEARINGTOP2_SOUTH
BEARINGTOP2_NORTH
**
**
*ELSET, ELSET=BEARINGLOW
BEARINGLOW1_SOUTH
BEARINGLOW1_NORTH
BEARINGLOW2_SOUTH
BEARINGLOW2_NORTH
**
**
*ELSET, ELSET=BEARINGPENDULUM
BEARINGPENDULUM1_SOUTH
BEARINGPENDULUM1_NORTH
BEARINGPENDULUM2_SOUTH
BEARINGPENDULUM2_NORTH
**
**
*ELSET, ELSET=BEARINGSPRING
BEARINGSPRING1_SOUTH
BEARINGSPRING1_NORTH
BEARINGSPRING2_SOUTH
BEARINGSPRING2_NORTH
**
**
*ELSET, ELSET=BEARING
BEARINGLOW
BEARINGTOP
BEARINGPENDULUM
BEARINGSPRING
**
**
*BEAM GENERAL SECTION, ELSET=BEARINGTOP, SECTION=GENERAL, DENSITY=0.000
1.00000e-01, 1.00000e+00, 0.00000e+00, 1.00000e+00, 1.00000e+00
1.000, 0.000, 0.000
2.10000e+12, 8.10000e+11
**
*BEAM GENERAL SECTION, ELSET=BEARINGLOW, SECTION=GENERAL, DENSITY=0.000
1.00000e-01, 1.00000e+00, 0.00000e+00, 1.00000e+00, 1.00000e+00
1.000, 0.000, 0.000
2.10000e+12, 8.10000e+11
**
*BEAM SECTION, ELSET=BEARINGPENDULUM, MATERIAL=STEEL, SECTION=BOX
0.20000, 0.20000, 0.02000, 0.02000, 0.02000, 0.02000
0.000, 1.000, 0.000
**
*RELEASE
BEARINGPENDULUM, S1, M1-M2
BEARINGPENDULUM, S2, M1-M2
**
***********************************************************
** CABLE CLAMP
***********************************************************
*ELEMENT, TYPE=B31, ELSET=CABLE_CLAMP_EAST
3000001, 10110, 11345
3000002, 10110, 11357
3000003, 10108, 11333
3000004, 10108, 11345
3000005, 10112, 11357
3000006, 10112, 11369
**
**
*ELEMENT, TYPE=B31, ELSET=CABLE_CLAMP_WEST
3001001, 20110, 12345
3001002, 20110, 12357
3001003, 20108, 12333
3001004, 20108, 12345
3001005, 20112, 12357
3001006, 20112, 12369
**
**
*NSET, NSET=CABLE_CLAMP_TEMPERATURE
10110,10108,10112,20110,20108,20112
**
**
*ELSET, ELSET=CABLE_CLAMP
CABLE_CLAMP_EAST
CABLE_CLAMP_WEST
**
**
*BEAM GENERAL SECTION, ELSET=CABLE_CLAMP, SECTION=GENERAL, DENSITY=7850.000
4.00000e-03, 1.00000e-07, 0.00000e+00, 1.00000e-07, 1.00000e-07
0.000, 1.000, 0.000
2.10000e+11, 8.10000e+10, 1.00000e-05
**
*END PART
**
***********************************************************
** ASSEMBLY
***********************************************************
*ASSEMBLY, NAME=ASSEMBLYSUSPENSIONBRIDGE
**
*INSTANCE, NAME=SUSPENSIONBRIDGE, PART=SUSPENSIONBRIDGE
**
*END INSTANCE
**
*END ASSEMBLY
**
**********
** Towers, retraction
**********
*STEP , NLGEO=YES, NAME=STEP1
*STATIC
1.0e-01,1.0e+00,1.0e-06,1.0e+00
**
*MODEL CHANGE, REMOVE
SUSPENSIONBRIDGE.CABLE_MAIN
SUSPENSIONBRIDGE.SADLESPRING
SUSPENSIONBRIDGE.BRIDGEDECK
SUSPENSIONBRIDGE.HANGER
SUSPENSIONBRIDGE.BEARINGTOP
SUSPENSIONBRIDGE.BEARINGPENDULUM
SUSPENSIONBRIDGE.BEARINGSPRING
**
*MODEL CHANGE, REMOVE
SUSPENSIONBRIDGE.CABLE_TEMPSUPPORT
**
*MODEL CHANGE, REMOVE
SUSPENSIONBRIDGE.BRIDGEDECK_SHELL
**
*MODEL CHANGE, REMOVE
SUSPENSIONBRIDGE.CABLE_CLAMP
**
*CLOAD, OP=NEW
SUSPENSIONBRIDGE.Tower_top_south_east, 1, -9.563e+05
SUSPENSIONBRIDGE.Tower_top_south_west, 1, -9.563e+05
**
*CLOAD, OP=NEW
SUSPENSIONBRIDGE.Tower_top_north_east, 1, 9.563e+05
SUSPENSIONBRIDGE.Tower_top_north_west, 1, 9.563e+05
**
*DLOAD, OP=NEW
, GRAV, 9.81000, 0 , 0, -1
**
*BOUNDARY, OP=NEW
SUSPENSIONBRIDGE.Tower_base,1,6,0
**
**
*OUTPUT, FIELD, FREQUENCY=100
*NODE OUTPUT
U
RF
COORD
**
*OUTPUT, FIELD, FREQUENCY=100
*ELEMENT OUTPUT
SF
**
*END STEP
**
**
**********
** Add main cable, release retraction
**********
*STEP , NLGEO=YES, NAME=STEP2
*STATIC
1.0e-06,1.0e+00,1.0e-12,1.0e+00
**
*MODEL CHANGE, ADD
SUSPENSIONBRIDGE.CABLE_MAIN
SUSPENSIONBRIDGE.SADLESPRING
**
*MODEL CHANGE, ADD
SUSPENSIONBRIDGE.CABLE_TEMPSUPPORT
**
*CLOAD, OP=NEW
**
*DLOAD, OP=NEW
, GRAV, 9.81000, 0 , 0, -1
**
*BOUNDARY, OP=NEW
SUSPENSIONBRIDGE.Tower_base,1,6,0
**
**
*BOUNDARY, OP=NEW
SUSPENSIONBRIDGE.Cable_main_anchorage,1,4,0
**
**
*OUTPUT, FIELD, FREQUENCY=100
*NODE OUTPUT
U
RF
COORD
**
*OUTPUT, FIELD, FREQUENCY=100
*ELEMENT OUTPUT
SF
S
**
*END STEP
**
**
**********
** Add hangers and bridge deck, remove main cable temp supports
**********
*STEP , NLGEO=YES, NAME=STEP3
*STATIC
1.0e-04,1.0e+00,1.0e-09,1.0e+00
**
*MODEL CHANGE, ADD
SUSPENSIONBRIDGE.BRIDGEDECK
SUSPENSIONBRIDGE.HANGER
SUSPENSIONBRIDGE.BEARINGTOP
**
*MODEL CHANGE, REMOVE
SUSPENSIONBRIDGE.CABLE_TEMPSUPPORT
**
*DLOAD, OP=NEW
SUSPENSIONBRIDGE.TOWER, GRAV, 9.81000, 0 , 0, -1
SUSPENSIONBRIDGE.CABLE_MAIN, GRAV, 9.81000, 0 , 0, -1
SUSPENSIONBRIDGE.HANGER, GRAV, 9.81000, 0 , 0, -1
SUSPENSIONBRIDGE.BRIDGEDECK, GRAV, 9.81000, 0 , 0, -1
SUSPENSIONBRIDGE.BEARINGTOP, GRAV, 9.81000, 0 , 0, -1
SUSPENSIONBRIDGE.BEARINGLOW, GRAV, 9.81000, 0 , 0, -1
**
*OUTPUT, FIELD, FREQUENCY=100
*NODE OUTPUT
U
RF
COORD
**
*OUTPUT, FIELD, FREQUENCY=100
*ELEMENT OUTPUT
SF
S
**
*END STEP
**
**
**********
** Add bearings at bridge deck ends
**********
*STEP , NLGEO=YES, NAME=STEP4
*STATIC
1.0e-01,1.0e+00,1.0e-06,1.0e+00
**
*MODEL CHANGE, ADD
SUSPENSIONBRIDGE.BEARINGPENDULUM
SUSPENSIONBRIDGE.BEARINGSPRING
**
*MODEL CHANGE, ADD
SUSPENSIONBRIDGE.BRIDGEDECK_SHELL
**
*MODEL CHANGE, ADD
SUSPENSIONBRIDGE.CABLE_CLAMP
**
*TEMPERATURE, OP=MOD
SUSPENSIONBRIDGE.CABLE_CLAMP_TEMPERATURE, -7.143e+01
**
**
*OUTPUT, FIELD, FREQUENCY=100
*NODE OUTPUT
U
RF
COORD
**
*OUTPUT, FIELD, FREQUENCY=100
*ELEMENT OUTPUT
SF
S
**
*END STEP
**
**
**********
**
**********
*STEP , NAME=STEP_MODAL
*FREQUENCY, NORMALIZATION=DISPLACEMENT, SIM=NO
100
**
**
*OUTPUT, FIELD
*NODE OUTPUT
U
COORD
**
*OUTPUT, FIELD
*ELEMENT OUTPUT
SF
**
*END STEP
**
**
